# Propiedades  Termofisicas
Sustancias := □
T_b := □
PM := □  # g/mol
# K | bar
T_c := □
P_c := □
ω := □
# Coeficientes de Cp Gas
Coef_CpG := □
# Cp Gas Real
Cp_G(T) := Coef_CpG*[1; T; T^2; T^3; T^4]  # J/(mol*K)
T_r := 20, 25 .. 1400
T_Ref := 298  # K
H_f := [0; 0; -296.6; -395.7; 0]*1000  # J/mol
P_Ref := 1 atm
# Entalpía Ideal
H_I(T) := H_f + Coef_CpG*[T; T^2/2; T^3/3; T^4/4; T^5/5] - Coef_CpG*[298; 298^2/2; 298^3/3; 298^4/4; 298^5/5]
# Entalpías Reales de Gas y Líquido
H(T, P, y) := H_I(T) + H_exc.PR(y, T, P, T_c, P_c, ω)
h(T, P, x) := H_I(T) + h_exc.PR(x, T, P, T_c, P_c, ω)
# Sólido
Coef_Cp.S.azufre := [2.003, 1.2002*10^-1, -1.6202*10^-4]
Cp_S.azufre(T) := Coef_Cp.S.azufre*[1; T; T^2]
# Entalpía del Sólido
H_S.sólido(T) := H_f[5] + integral(Cp_S.azufre(T), T = 298 .. T)
T_r1 := 300, 310 .. 1500
# Datos
N_c := □
N_s := □
i := 1 .. N_c
j := 1 .. N_s
g(x, y) := □
f := matrix(N_c, N_s, g)
f(β) :=
    f ← f(β)
    f*mol/hr  # disabled
F(β) :=
    f ← f(β)
    for i ∈ 1 .. N_c
        for j ∈ 1 .. N_s
            F[j] ← sum(f[i, j], i = 1 .. N_c)
    F
w(β) :=
    f ← f(β)
    for i ∈ 1 .. N_c
        for j ∈ 1 .. N_s
            w[i, j] ← f[i, j]*PM[i]
    w
W(β) :=
    w ← w(β)
    for i ∈ 1 .. N_c
        for j ∈ 1 .. N_s
            W[j] ← sum(w[i, j], i = 1 .. N_c)
    W
x(β) :=
    f ← f(β)
    for i ∈ 1 .. N_c
        for j ∈ 1 .. N_s
            x[i, j] ← f[i, j]/sum(f[i, j], i = 1 .. N_c)
    x
%P(β) :=
    w ← w(β)
    for i ∈ 1 .. N_c
        for j ∈ 1 .. N_s
            %P[i, j] ← w[i, j]/sum(w[i, j], i = 1 .. N_c)
    %P
EaE(a, b) :=
    for i ∈ 1 .. rows(a)
        c[i] ← a[i]*b[i]
    c
K_LV(x, y, T, P) := ϕ_L.PR(x, T, P, T_c, P_c, ω)/ϕ_V.PR(y, T, P, T_c, P_c, ω)
# Cálculo del Punto Burbuja
Given
y == EaE(K_LV(x, y, T, P), x)
sum(y) == 1
Sol(x, P, y, T) := Find(y, T)
y_burbuja(x, P, y, T) := Sol(x, P, y, T)[1]
T_burbuja(x, P, y, T) := Sol(x, P, y, T)[2]
# Cálculo del Punto Rocío
Given
y == EaE(K_LV(x, y, T, P), x)
sum(x) == 1
Sol(y, P, x, T) := Find(x, T)
y_rocio(y, P, x, T) := Sol(y, P, x, T)[1]
T_rocio(y, P, x, T) := Sol(y, P, x, T)[2]
# Cálculo del α
Given
Z == (1 - α)*x + α*y
y == EaE(K_LV(x, y, T, P), x)
sum(x) == 1
sum(y) == 1
Sol(Z, T, P, x, y, α) := Find(x, y, α)
α_flash(Z, T, P, x, y, α, T_B, T_R) := if(T < T_B, 0, if(T > T_R, 1, Sol(Z, T, P, x, y, α)[3]))
T_BUR(n) := T_burbuja(x(β)[:, n], P[n], x(β)[:, n], T_b*x(β)[:, n])
T_ROC(n) := T_rocio(x(β)[:, n], P[n], x(β)[:, n], T_b*x(β)[:, n])
E(n) := f(β)[:, n]*H(T[n], P[n], x(β)[:, n])
