# Worksheet setting: ORIGIN = 1
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kmol := 1000 mol
## Propiedades termodinámicas
PM := [46; 32; 18]
T_b := [248.31; 337.85; 373.15]
sustancias := ["Dimetil eter (C2H6O)"; "Metanol (CH4O)"; "Agua (H20)"]
# [reference: PR.xmcdz]
T_c := [400.1; 512.58; 647.13]
P_c := [53.7; 80.86; 220.55]  # bar
V_c := [170; 117.5; 56]  # cm3/mol
ρ := [0.271; 0.272; 0.322]  # g/cm3
ω := [0.204; 0.566; 0.345]
Coef_Cp.G := [
    34.668, 0.07029, 0.0001653, -1.767e-7, 4.9313e-11;
    40.046, -0.03829, 0.00024529, -2.168e-7, 5.9909e-11;
    33.933, -0.0084186, 2.9906e-5, -1.7825e-8, 3.6934e-12
]
T_r := 100, 105 .. 900
Cp_G(T) := Coef_Cp.G*[1; T; T^2; T^3; T^4]  # J/(mol*K)
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# Estas gráficas deben ser todas positivas, en lo contrario la estimación está mal hecha
Coef_H.f := [-165.640, -0.072140, 3.4328e-5; -187.990, -0.049757, 2.1603e-5; -238.410, -0.012256, 2.7656e-6]
H_f(T) := Coef_H.f*[1; T^1; T^2]
H_ideal(T) := H_f(T) + integral(Cp_G(T), T = 298 .. T)  # disabled
H_ideal(T) := H_f(T) + Coef_Cp.G*[T; T^2/2; T^3/3; T^4/4; T^5/5] - Coef_Cp.G*[298; 298^2/2; 298^3/3; 298^4/4; 298^5/5]
H(T, P, y) := H_ideal(T) + H_exc.PR(y, T, P, T_c, P_c, ω)  # J/mol
P_c = [53.7; 80.86; 220.55]
h(T, P, x) := H_ideal(T) + h_exc.PR(x, T, P, T_c, P_c, ω)  # J/mol
T_r := 50, 60 .. 600
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## Datos
N_c := 3
N_s := 12
g(x, y) := 10
i := 1 .. N_c
j := 1 .. N_s
f := matrix(N_c, N_s, g)
F_1 := 100  # kmol/h
x[:, 1] := [0; 1; 0]
f[:, 1] := F_1*x[:, 1]
## Reactor
ν := [1; -2; 1]
χ_CH3OH := 0.935
ε := 10
## Torres
LK_T1 := 0.005
HK_T1 := 0.0001
LK_T2 := 0.01
HK_T2 := 0.01
β := 0.25
ff := f
## Resolución
Given
## Mezclador
ff[:, 1] + f[:, 12] == f[:, 2]
## Intercambiador 1
f[:, 3] == f[:, 2]
## Reactor
χ_CH3OH == (f[2, 3] - f[2, 4])/f[2, 3]
f[:, 4] == f[:, 3] + ν*ε
## Intercambiador 2
f[:, 4] == f[:, 5]
## Torre 1
f[:, 5] == f[:, 6] + f[:, 7]
f[1, 6] == 0
f[2, 6] == LK_T1*f[2, 5]
f[3, 7] == HK_T1*f[3, 5]
## Intercambiador 3
f[:, 7] == f[:, 8]
## Torre 2
f[:, 8] == f[:, 9] + f[:, 10]
f[3, 9] == 0
f[1, 10] == LK_T2*f[1, 8]
f[2, 9] == HK_T2*f[2, 8]
## Splitter
f[:, 10] == f[:, 11] + f[:, 12]
f[:, 11] == β*f[:, 10]
[f(β); ε(β)] := Find(f, ε)
ε(0.25) = 49.1082
f(β) :=
    f ← f(β)
    f*kmol/hr
F(β) :=
    f ← f(β)
    for i ∈ 1 .. N_c
        for j ∈ 1 .. N_s
            F[j] ← sum(f[i, j], i = 1 .. N_c)
    F
w(β) :=
    f ← f(β)
    for i ∈ 1 .. N_c
        for j ∈ 1 .. N_s
            w[i, j] ← f[i, j]*PM[i]
    w
W(β) :=
    w ← w(β)
    for i ∈ 1 .. N_c
        for j ∈ 1 .. N_s
            W[j] ← sum(w[i, j], i = 1 .. N_c)
    W
x(β) :=
    f ← f(β)
    for i ∈ 1 .. N_c
        for j ∈ 1 .. N_s
            x[i, j] ← f[i, j]/sum(f[i, j], i = 1 .. N_c)
    x
%P(β) :=
    w ← w(β)
    for i ∈ 1 .. N_c
        for j ∈ 1 .. N_s
            %P[i, j] ← w[i, j]/sum(w[i, j], i = 1 .. N_c)
    %P
# Consistencia del BM
W(β)[1] - W(β)[6] - W(β)[9] - W(β)[11] = 1.02318e-13 kmol/hr
# Balance de energía
# T=0 // T desconocida
# α=1 // gas
# α=0 // liq
# α=-1 // desconocida
T := [298; 0; 500; 500; 350; 0; 0; 300; 0; 0; 0; 0]  # K
P := [1; 1; 1; 1; 1; 1; 1; 1; 1; 1; 1; 1]
α := [0; 0; 1; 1; -1; -1; -1; 1; -1; -1; -1; -1]
EaE(a, b) :=
    for i ∈ 1 .. rows(a)
        c[i] ← a[i]*b[i]
    c
K_LV(x, y, T, P) := ϕ_L.PR(x, T, P, T_c, P_c, ω)/ϕ_V.PR(y, T, P, T_c, P_c, ω)
# Calculo del punto burbuja:
# X,P// datos; Y,T// incognitas
Given
Y == EaE(K_LV(X, Y, T, P), X)
sum(Y) == 1
Sol(X, P, Y, T) := Find(Y, T)
y_Burb(X, P, Y, T) := Sol(X, P, Y, T)[1]
T_Burb(X, P, Y, T) := Sol(X, P, Y, T)[2]
# Calculo de punto rocío:
# Y,P son dato
# X,T incognitas
Given
Y == EaE(K_LV(X, Y, T, P), X)
sum(X) == 1
Sol(Y, P, X, T) := Find(X, T)
x_rocio(Y, P, X, T) := Sol(Y, P, X, T)[1]
T_rocio(Y, P, X, T) := Sol(Y, P, X, T)[2]
# Calculo de α para una mezcla en eq:
# Zm, T.eq, P // Dato
# X,Y,α // Incognitas
Given
z == (1 - α)*X + α*Y
Y == EaE(K_LV(X, Y, T, P), X)
sum(Y) == 1
sum(X) == 1
Sol(z, T, P, X, Y, α) := Find(X, Y, α)
x_flash(z, T, P, X, Y, α) := Sol(z, T, P, X, Y, α)[1]
y_flash(z, T, P, X, Y, α) := Sol(z, T, P, X, Y, α)[2]
α_flash(z, T, P, X, Y, α, T_B, T_R) := if(T < T_B, 0, if(T > T_R, 1, Sol(z, T, P, X, Y, α)[3]))
## Balance de energía
# Corriente F1
T[1] = 298
P[1] = 1
α[1] = 0
T_B[1] := T_Burb(x(β)[:, 1], P[1], x(β)[:, 1], T_b*x(β)[:, 1]) = 337.515
T_R[1] := T_rocio(x(β)[:, 1], P[1], x(β)[:, 1], T_b*x(β)[:, 1]) = 337.515
# Observamos que T1 es menor q T.Burb, por lo tanto tengo todo en estado liquido.
# Al ser un componente puro, TB = TR
# Corriente F3
T[3] = 500
P[3] = 1
α[3] = 1
# Corriente F4
T[4] = 500
P[4] = 1
α[4] = 1
# Corriente F5
T[5] = 350
P[5] = 1
α[5] = -1
T_B[5] := T_Burb(x(β)[:, 5], P[5], x(β)[:, 5], T_b*x(β)[:, 5]) = 240.823
T_R[5] := T_rocio(x(β)[:, 5], P[5], [0; 0; 1], 300) = 354.515
# T5 está entre TB y TR, por lo tanto la corriente se encuentra en eq de fases
α[5] := α_flash(x(β)[:, 4], T[5], P[5], [0; 0; 1], [1; 0; 0], 0.5, T_B[5], T_R[5]) = 0.868789
# Las corrientes de salida de una columna de separación siempre salen en estado de liq saturado, por lo tanto sale a T=T.B
# Corriente F6
T[6] = 0
P[6] = 1
α[6] = -1
T_B[6] := T_Burb(x(β)[:, 6], P[6], x(β)[:, 6], T_b*x(β)[:, 6]) = 373.308
T[6] := T_B[6]
α[6] := 0
# Corriente F7
T[7] = 0
P[7] = 1
α[7] = -1
T_B[7] := T_Burb(x(β)[:, 7], P[7], x(β)[:, 7], T_b*x(β)[:, 7]) = 250.883
T[7] := T_B[7]
α[7] := 0
# Corriente F8
T[8] = 300
P[8] = 1
α[8] = 1
# Corriente F9
T[9] = 0
P[9] = 1
α[9] = -1
T_B[9] := T_Burb(x(β)[:, 9], P[9], x(β)[:, 9], T_b*x(β)[:, 9]) = 248.315
T[9] := T_B[9]
α[9] := 0
# Corriente F10
T[10] = 0
P[10] = 1
α[10] = -1
T_B[10] := T_Burb(x(β)[:, 10], P[10], x(β)[:, 10], T_b*x(β)[:, 10]) = 293.438
T[10] := T_B[10]
α[10] := 0
# Las corrientes F11 y F12 tienen iguales prop q la 10, ya que el splitter no modifica las mismas
T[11] := T[10]
T[12] := T[10]
α[11] := α[10]
α[12] := α[10]
# Corriente 2
T_i := 500
T[2] := root(f(β)[:, 1]*h(T[1], P[1], x(β)[:, 1]) + f(β)[:, 12]*h(T[12], P[12], x(β)[:, 12]) - f(β)[:, 2]*h(T_i, P[2], x(β)[:, 2]), T_i, 100, 800)
T[2] = 297.755
T = [298; 297.755; 500; 500; 350; 373.308; 250.883; 300; 248.315; 293.438; 293.438; 293.438]
α = [0; 0; 1; 1; 0.868789; 0; 0; 1; 0; 0; 0; 0]
# Calculo de Q de los IC
Q_1 := f(β)[:, 3]*H(T[3], P[3], x(β)[:, 3]) - f(β)[:, 2]*h(T[2], P[2], x(β)[:, 2]) = 5371776 kmol/hr  # kJ/hr
# Al ser Q1 positivo significa que le estamos dando un aporte de energia al sistema
Q_2 := f(β)[:, 5]*(α[5]*H(T[5], P[5], x(β)[:, 5]) + (1 - α[5])*h(T[5], P[5], x(β)[:, 5])) - f(β)[:, 4]*H(T[4], P[4], x(β)[:, 4]) = -355130 mol/s
# Se extrae energía
Q_3 := f(β)[:, 8]*H(T[8], P[8], x(β)[:, 8]) - f(β)[:, 7]*h(T[7], P[7], x(β)[:, 7]) = 416165 mol/s
# Aporte de energia
F_E := ["F2"; "F4"; "F7"]
F_S := ["F3"; "F5"; "F8"]
T_E := [T[2]; T[4]; T[7]] = [297.755; 500; 250.883]
T_S := [T[3]; T[5]; T[8]] = [500; 350; 300]
Tipo := [1; -1; 1]
# 1 Cold = corriente fría que se calentará
# -1 Hot = corriente caliente que se enfriará
α[2] = 0
H_E := [
    f(β)[:, 2]*h(T[2], P[2], x(β)[:, 2]);
    f(β)[:, 4]*H(T[4], P[4], x(β)[:, 4]);
    f(β)[:, 7]*h(T[7], P[7], x(β)[:, 7])
] = [-1193989; 326118; -418935] mol/s
α[4] = 1
α[7] = 0
α[5] = 0.868789
α[3] = 1
α[8] = 1
H_S := [
    f(β)[:, 3]*H(T[3], P[3], x(β)[:, 3]);
    f(β)[:, 5]*(α[5]*H(T[5], P[5], x(β)[:, 5]) + (1 - α[5])*h(T[5], P[5], x(β)[:, 5]));
    f(β)[:, 8]*H(T[8], P[8], x(β)[:, 8])
]
CP := (H_S - H_E)/(T_S - T_E) = [7377.99; 2367.54; 8472.85] mol/s  # J/(K*hr)
ΔT_min := 10
S_E := T_E + Tipo*ΔT_min/2 = [302.755; 495; 255.883]
S_S := T_S + Tipo*ΔT_min/2 = [505; 345; 305]
N_corrientes := 3
ΔT := 1
T_min := 255
T_max := 505
N := (T_max - T_min)/ΔT + 1 = 251
i := 1 .. N
T[i] := T_min + (T_max - T_min)/(N - 1)*(i - 1)
GCC(H0) :=
    T[1] ← T_min
    H[1] ← H0
    for i ∈ 1 .. N - 1
        H[i + 1] ← H[i]
        for j ∈ 1 .. N_corrientes
            if Tipo[j] == 1
                H[i + 1] ← H[i + 1] + CP[j]*ΔT if (T[i] ≥ S_E[j]) and (T[i] < S_S[j])
            if Tipo[j] == -1
                H[i + 1] ← H[i + 1] - CP[j]*ΔT if (T[i] ≥ S_S[j]) and (T[i] < S_E[j])
        T[i + 1] ← T[i] + ΔT
    H
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