# Worksheet setting: ORIGIN = 1
Sustancias := ["N2"; "O2"; "C2H4"; "CO2"; "C2H4O"; "H2O"; "Etilenglicol"]
T_b := [77.35; 90.17; 169.38; 194.7; 285; 373.15; 470.5]
ORIGIN ≡ 1
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T_c := [126.1; 154.58; 282.34; 304.19; 469.15; 647.13; 720]
P_c := [33.94; 50.43; 50.41; 73.82; 71.9; 220.55; 82]
ω := [0.04; 0.022; 0.086; 0.228; 0.197; 0.345; 0.507]
PM := [28; 32; 28; 44; 44; 18; 62]*gm/mol
kmol := 1000 mol
kJ := 1000 J
Coef_Cp := [
    29.342, -0.0035395, 0.000010076, -4.3116e-9, 2.5935e-13;
    29.526, -0.0088999, 0.000038083, -3.2629e-8, 8.8607e-12;
    32.083, -0.014831, 0.00024774, -2.377e-7, 6.8274e-11;
    27.437, 0.042315, -0.000019555, 3.997e-9, -2.9872e-13;
    30.827, -0.0076041, 0.00032347, -3.275e-7, 9.7271e-11;
    33.933, -0.0084186, 0.000029906, -1.7825e-8, 3.6934e-12;
    48.218, 0.19073, -6.6117*10^-5, -1.883*10^-8, 1.2555*10^-11
]
Cp_g(T) := Coef_Cp[:, 1] + Coef_Cp[:, 2]*T + Coef_Cp[:, 3]*T^2 + Coef_Cp[:, 4]*T^3 + Coef_Cp[:, 5]*T^4  # J/(mol*K)
Cp_g(298.15) = [29.0702; 29.4631; 43.9232; 38.4185; 49.4029; 33.6382; 98.8069]
Coef_Hf := [
    0, 0, 0;
    0, 0, 0;
    63.654, -0.043253, 0.000019599;
    -393.88, 0.0019102, -0.000002106;
    -38.303, -0.056576, 0.000028924;
    -238.41, -0.012256, 2.7656e-6;
    -376.310, -0.044634, 2.3855*10^-5
]
H_f(T) := (Coef_Hf[:, 1] + Coef_Hf[:, 2]*T + Coef_Hf[:, 3]*T^2)*1000  # J/mol
H_f(298) = [0; 0; 52505.1; -393498; -52594.1; -241817; -387493]
H_id(T) := H_f(T) + Coef_Cp*[T; T^2/2; T^3/3; T^4/4; T^5/5] - Coef_Cp*[298; 298^2/2; 298^3/3; 298^4/4; 298^5/5]
# [reference: PR.xmcdz]
H(y, T, P) := (H_id(T) + H_exc.PR(y, T, P, T_c, P_c, ω))*J/mol
h(x, T, P) := (H_id(T) + h_exc.PR(x, T, P, T_c, P_c, ω))*J/mol
N_c := 7
N_s := 12
i := 1 .. N_c
j := 1 .. N_s
g(x, y) := 10
f := matrix(N_c, N_s, g)
# Datos
## Mezclador
F_2 := 100  # kmol/hr
x[:, 2] := [0; 0; 1; 0; 0; 0; 0]
f[:, 2] := F_2*x[:, 2]
Sustancias = ["N2"; "O2"; "C2H4"; "CO2"; "C2H4O"; "H2O"; "Etilenglicol"]
x[:, 1] := [0.79; 0.21; 0; 0; 0; 0; 0]
Rm_23 := 2.033
## Reactor
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l
ν := [0, 0; -0.5, -3; -1, -1; 0, 2; 1, 0; 0, 2; 0, 0]
χ_3 := 0.37
R_end := 0.8
Sustancias = ["N2"; "O2"; "C2H4"; "CO2"; "C2H4O"; "H2O"; "Etilenglicol"]
## Torre de separación
HK := 0.1
LK := 0.1
## Torre de absorción
Abs := 0.9785
F_8 := 50  # kmol/hr
x[:, 8] := [0; 0; 0; 0; 0; 1 - 0.0075; 0.0075]
f[:, 8] := F_8*x[:, 8]
## Separador
β := 0.4  # Purga
# Balance de masa
ff := f
ε := [10; 10]
Given
## Mezclador
f[:, 1] + ff[:, 2] + f[:, 12] == f[:, 3]
Rm_23 == f[2, 3]/f[3, 3]
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sum(f[:, 1])*x[:, 1] == f[:, 1]
## Reactor
f[:, 4] == f[:, 3] + ν*ε
f
χ_3*f[3, 3] == f[3, 3] - f[3, 4]
(f[3, 3] - f[3, 4])*R_end == f[5, 4] - f[5, 3]
# Rendimiento = Pdto q se genera - entra /
# Reactivo que entra - sale
## Torre de separación
f[:, 4] == f[:, 5] + f[:, 6]
f[1, 5] == 0
Sustancias = ["N2"; "O2"; "C2H4"; "CO2"; "C2H4O"; "H2O"; "Etilenglicol"]  # LK
f[2, 5] == 0
HK
f[3, 5] == 0
f[4, 5] == 0
f[5, 5] == LK*f[5, 4]
f[6, 6] == HK*f[6, 4]
f[7, 6] == 0
## IC 1
f[:, 6] == f[:, 7]
## Torre de Absorción
f[:, 7] + ff[:, 8] == f[:, 9] + f[:, 10]
f[1, 9] == 0
f[2, 9] == 0
f[3, 9] == 0
f[4, 9] == 0
Sustancias = ["N2"; "O2"; "C2H4"; "CO2"; "C2H4O"; "H2O"; "Etilenglicol"]
f[5, 9] == Abs*f[5, 7]
f[6, 10] == 0
f[7, 10] == 0
## Separador
f[:, 10] == f[:, 11] + f[:, 12]
f[:, 11] == β*f[:, 10]
[f(β); ε(β)] := Find(f, ε)
f(β) = [
    626.097, 0, 1565.24, 1565.24, 0, 1565.24, 1565.24, 0, 0, 1565.24, 626.097, 939.146;
    166.431, 0, 326.849, 267.363, 0, 267.363, 267.363, 0, 0, 267.363, 106.945, 160.418;
    0, 100, 160.772, 101.286, 0, 101.286, 101.286, 0, 0, 101.286, 40.5145, 60.7717;
    0, 0, 35.6913, 59.4855, 0, 59.4855, 59.4855, 0, 0, 59.4855, 23.7942, 35.6913;
    0, 0, 0.558991, 48.1474, 4.81474, 43.3327, 43.3327, 0, 42.401, 0.931652, 0.372661, 0.558991;
    0, 0, 0, 23.7942, 21.4148, 2.37942, 2.37942, 49.625, 52.0044, 0, 0, 0;
    0, 0, 0, 0, 0, 0, 0, 0.375, 0.375, 0, 0, 0
]
Sustancias = ["N2"; "O2"; "C2H4"; "CO2"; "C2H4O"; "H2O"; "Etilenglicol"]
ε(β) = [47.5884; 11.8971]
f(β) :=
    f ← f(β)
    f*kmol/hr
F(β) :=
    f ← f(β)
    for i ∈ 1 .. N_c
        for j ∈ 1 .. N_s
            F[j] ← sum(f[i, j], i = 1 .. N_c)
    F
w(β) :=
    f ← f(β)
    for i ∈ 1 .. N_c
        for j ∈ 1 .. N_s
            w[i, j] ← f[i, j]*PM[i]
    w
W(β) :=
    w ← w(β)
    for i ∈ 1 .. N_c
        for j ∈ 1 .. N_s
            W[j] ← sum(w[i, j], i = 1 .. N_c)
    W
x(β) :=
    f ← f(β)
    for i ∈ 1 .. N_c
        for j ∈ 1 .. N_s
            x[i, j] ← f[i, j]/sum(f[i, j], i = 1 .. N_c)
    x
%P(β) :=
    w ← w(β)
    for i ∈ 1 .. N_c
        for j ∈ 1 .. N_s
            %P[i, j] ← w[i, j]/sum(w[i, j], i = 1 .. N_c)
    %P
## Consistencia del BM
W(β)[1] + W(β)[2] + W(β)[8] - W(β)[5] - W(β)[9] - W(β)[11] = 6.39488e-12 kg/hr
T := [298; 298; 0; 0; 0; 310; 360; 360; 360; 360; 360; 360]  # K
P := [3.5; 3.5; 3.5; 3.5; 3.5; 3.5; 3.5; 3.5; 3.5; 3.5; 3.5; 3.5]  # bar
α := [-1; -1; -1; -1; 0; 1; 1; 0; 0; 1; 1; 1]
# α=1 // gas
# α=0 // liq
# α=-1 // desconocida
# T=0 // T desconocida
EaE(a, b) :=
    for i ∈ 1 .. rows(a)
        c[i] ← a[i]*b[i]
    c
K_LV(x, y, T, P) := ϕ_L.PR(y, T, P, T_c, P_c, ω)/ϕ_V.PR(x, T, P, T_c, P_c, ω)
# para tmperaturas criticas bajas usamos fi - fi
# si tuviesemos sustancias menos volatilas a temperaturas de 300 400 o 500 K podriamos usar el modelo gamma fi
## Calculo del punto burbuja
# X,P// datos
# Y,T// incognitas
Given
Y == EaE(K_LV(X, Y, T, P), X)
sum(Y) == 1
Sol(X, P, Y, T) := Find(Y, T)
y_Burb(X, P, Y, T) := Sol(X, P, Y, T)[1]
T_Burb(X, P, Y, T) := Sol(X, P, Y, T)[2]*K
# Cálculo de punto rocío
# Y,P//dato
# X,T//incognitas
Given
Y == EaE(K_LV(X, Y, T, P), X)
sum(X) == 1
Sol_1(Y, P, X, T) := Find(X, T)
x_roc(Y, P, X, T) := Sol_1(Y, P, X, T)[1]
T_roc(Y, P, X, T) := Sol_1(Y, P, X, T)[2]*K
# Cálculo de α para una mezcla en eq:
# Zm, T.eq, P// dato
# X,Y, α // incognit
Given
Y == EaE(K_LV(X, Y, T, P), X)
sum(X) == 1
sum(Y) == 1
z == (1 - α)*X + α*Y
Sol_2(z, T, P, X, Y, α) := Find(X, Y, α)
x_flash(z, T, P, X, Y, α) := Sol_2(z, T, P, X, Y, α)[1]
y_flash(z, T, P, X, Y, α) := Sol_2(z, T, P, X, Y, α)[2]
α_flash(z, T, P, X, Y, α) := Sol_2(z, T, P, X, Y, α)[3]
## Balance de Energía
β := 0.3
## Corriente 1
T[1] = 298
P[1] = 3.5
α[1] = -1
T_B[1] := T_Burb(x(β)[:, 1], P[1], x(β)[:, 1], T_b*x(β)[:, 1]) = 91.4205 K  # damos un valor inicial igual q la composicion, si no calcula debemos cambiarlo
T_R[1] := T_roc(x(β)[:, 1], P[1], x(β)[:, 1], T_b*x(β)[:, 1]) = 93.3876 K
# La T es mayor que la TR, por lo tanto la corriente es vapor
α[1] := 1
## Corriente 2
T[2] = 298
P[2] = 3.5
α[2] = -1
T_B[2] := T_Burb(x(β)[:, 2], P[2], x(β)[:, 2], T_b*x(β)[:, 2]) = 193.713 K
T_R[2] := T_roc(x(β)[:, 2], P[1], x(β)[:, 2], T_b*x(β)[:, 2]) = 193.713 K
# La corriente 2 es una sust pura, por lo tanto TB = TR. Al ser su T mayor que TR, la corriente es gaseosa
α[2] := 1
## Corriente 3
T[3] = 0
P[3] = 3.5
α[3] = -1
## Corriente 4
T[4] = 0
P[4] = 3.5
α[4] = -1
## Corriente 5
T[5] = 0
P[5] = 3.5
α[5] = 0
# Dejamos las corrientes 3, 4 y 5 para el final, ya que no conocemos F12
## Corriente 6
T[6] = 310
P[6] = 3.5
α[6] = 1
## Corriente 7
T[7] = 360
P[7] = 3.5
α[7] = 1
## Corriente 8
T[8] = 360
P[8] = 3.5
α[8] = 0
## Corriente 9
T[9] = 360
P[9] = 3.5
α[9] = 0
## Corriente 10
T[10] = 360
P[10] = 3.5
α[10] = 1
## Corriente 11
T[11] = 360
P[11] = 3.5
α[11] = 1
## Corriente 6
T[12] = 360
P[12] = 3.5
α[12] = 1
## Corriente 3
T[3] = 0
P[3] = 3.5
α[3] = -1
T[3] := root(f(β)[:, 1]*H(x(β)[:, 1], T[1], P[1]) + f(β)[:, 2]*H(x(β)[:, 2], T[2], P[2]) + f(β)[:, 12]*H(x(β)[:, 12], T[12], P[12]) - f(β)[:, 3]*H(x(β)[:, 3], T_i, P[3]), T_i, 200, 1000) = 340.304
T_B[3] := T_Burb(x(β)[:, 3], P[3], x(β)[:, 3], T_b*x(β)[:, 3]) = 92.3168 K
T_R[3] := T_roc(x(β)[:, 3], P[3], x(β)[:, 3], T_b*x(β)[:, 3]) = 131.296 K
# La T es mayor qye TR, por lo tanto es gaseoso
α[3] := 1
## Corriente 4
T[4] = 0
P[4] = 3.5
α[4] = -1
T[4] := root(f(β)[:, 3]*H(x(β)[:, 3], T[3], P[3]) - f(β)[:, 4]*H(x(β)[:, 4], T_i, P[4]), T_i, 200, 1000) = 636.719
α[4] := 1
## Corriente 5
# Es la corriente de salida de una Torre de destilacion por lo tanto es liq saturado.
T[5] = 0
P[5] = 3.5
α[5] = 0
T[5] := T_Burb(x(β)[:, 5], P[5], x(β)[:, 5], T_b*x(β)[:, 5])  # error: This value has units: Temperature, but must have units: Unitless.
α[7] = 1
## Calor del IC1
Q_1 := f(β)[:, 7]*H(x(β)[:, 7], T[7], P[7]) - f(β)[:, 6]*H(x(β)[:, 6], T[6], P[6]) = kJ/hr  # error: This variable is undefined.  # kJ/hr
# Es positivo, por lo tanto debo agg Q al sistema
f(0.0001)[5, 9] = 19.9527 mol/s
f(1)[5, 9] = 7.2409 mol/s
P_5 := 10.4 = 10.4  # usd/kg
P_3 := 3.2*2.205 = 7.056  # usd/kg
Sustancias = ["N2"; "O2"; "C2H4"; "CO2"; "C2H4O"; "H2O"; "Etilenglicol"]
P_7 := 4.7*2.205 = 10.3635  # usd/kg
f(β) = [
    162.429, 0, 541.43, 541.43, 0, 541.43, 541.43, 0, 0, 541.43, 162.429, 379.001;
    43.1773, 0, 101.024, 82.6376, 0, 82.6376, 82.6376, 0, 0, 82.6376, 24.7913, 57.8464;
    0, 27.7778, 49.6919, 31.3059, 0, 31.3059, 31.3059, 0, 0, 31.3059, 9.39177, 21.9141;
    0, 0, 17.1603, 24.5147, 0, 24.5147, 24.5147, 0, 0, 24.5147, 7.3544, 17.1603;
    0, 0, 0.201966, 14.9108, 1.49108, 13.4197, 13.4197, 0, 13.1312, 0.288523, 0.086557, 0.201966;
    0, 0, 0, 7.3544, 6.61896, 0.73544, 0.73544, 13.7847, 14.5202, 0, 0, 0;
    0, 0, 0, 0, 0, 0, 0, 0.104167, 0.104167, 0, 0, 0
] mol/s
Sustancias = ["N2"; "O2"; "C2H4"; "CO2"; "C2H4O"; "H2O"; "Etilenglicol"]
PE(β) := w(β)[5, 9]*P_5 - w(β)[3, 2]*P_3 - w(β)[7, 8]*P_7  # usd/hr
β_r := 0, 0.01 .. 1
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K_1 := [4.3247; 3.1529; 3.4974]
K_2 := [-0.3030; 0.1125; 0.4485]
K_3 := [0.1634; 0.1050; 0.1074]
Reactor(β) := 10^(K_1[1] + K_2[1]*log(F(β)[3]) + K_3[1]*log(F(β)[3])^2)  # error: This value has units: Substance · Time^-1, but must have units: Unitless.  # usd
Torre_Sep(β) := 10^(K_1[2] + K_2[2]*log(F(β)[4]) + K_3[2]*log(F(β)[4])^2)  # error: This value has units: Substance · Time^-1, but must have units: Unitless.
usd
Torre_Abs(β) := 10^(K_1[3] + K_2[3]*log(F(β)[7]) + K_3[3]*log(F(β)[7])^2)  # error: This value has units: Substance · Time^-1, but must have units: Unitless.
usd
Costo_eq(β) := Reactor(β) + Torre_Sep(β) + Torre_Abs(β)  # error: This variable is undefined.
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