# Worksheet setting: ORIGIN = 1
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# [reference: PR.xmcdz]
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sustancias := ["nitrogeno""; "etileno"; "acetileno"; "acetaldehido"; "etanol"; "agua"]
PM := [28; 28; 26; 44; 46; 18]
T_b := [77.4; 169.3; 188.4; 294; 351.4; 373.2]
T_c := [126.2; 282.4; 308.3; 461; 513.9; 647.3]
P_c := [33.9; 50.4; 61.4; 55.7; 61.4; 221.2]
V_c := [89.8; 130.4; 112.7; 154; 167.1; 57.1]
Z_c := [0.290; 0.280; 0.270; 0.220; 0.240; 0.235]
ω := [0.039; 0.089; 0.190; 0.303; 0.644; 0.344]
sustancias = ["nitrogeno""; "etileno"; "acetileno"; "acetaldehido"; "etanol"; "agua"]
ΔH_f := [0; 5.234*10^4; 2.269*10^5; -1.644*10^5; -2.35*10^5; -2.42*10^5]
Coef_Cp.G := [
    29.342, -0.0035395, 1.0076e-5, -4.3116e-9, 2.5935e-13;
    32.083, -0.01483, 0.00024774, -2.377e-7, 6.8274e-11;
    19.36, 0.11519, -0.00012374, 7.237e-8, -1.659e-11;
    34.14, 0.04002, 0.00015634, -1.644e-7, 4.7248e-11;
    27.091, 0.11055, 0.00010957, -1.505e-7, 4.6601e-11;
    33.933, -0.0084186, 2.9906e-5, -1.7825e-8, 3.6934e-12
]
ΔH_V := [5.68; 13.46; 16.74*(1 - T_b[3]/T_c[3])^-0.056; 24.63; 39.4; 39.5]*1000
Cp_G(T) := Coef_Cp.G*[1; T; T^2; T^3; T^4]  # J/(mol*K)
H_ideal(T) := ΔH_f + Coef_Cp.G*[T; T^2/2; T^3/3; T^4/4; T^5/5] - Coef_Cp.G*[298; 298^2/2; 298^3/3; 298^4/4; 298^5/5]
H(T, P, y) := H_ideal(T) + H_exc.PR(y, T, P, T_c, P_c, ω)  # J/mol
h(T, P, x) := H_ideal(T) + h_exc.PR(x, T, P, T_c, P_c, ω)  # J/mol
T_r := 100, 102 .. 900
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## Resolución
N_c := 6
N_s := 25
i := 1 .. N_c
j := 1 .. N_s
g(x, y) := 1
f := matrix(N_c, N_s, g)
## Datos del Proceso
F_1 := 100  # mol/hr
x[:, 1] := [0.001; 0.97; 0.029; 0; 0; 0]
sustancias = ["nitrogeno""; "etileno"; "acetileno"; "acetaldehido"; "etanol"; "agua"]
F_15 := 120  # mol/hr
x[:, 15] := [0; 0; 0; 0; 0; 1]
f[:, 15] := F_15*x[:, 15]
f[:, 1] := F_1*x[:, 1]
## Datos del reactor
# R1 | R2
ε := [1; 1]
sustancias = ["nitrogeno""; "etileno"; "acetileno"; "acetaldehido"; "etanol"; "agua"]
ν := [0, 0; -1, 0; 0, -1; 0, 1; 1, 0; -1, -1]
χ_R1 := 0.75
χ_R2 := 0.63
## Datos de las torres
α := 0.01
β := 0.2
sustancias = ["nitrogeno""; "etileno"; "acetileno"; "acetaldehido"; "etanol"; "agua"]
ff := f
## Resolución
Given
## Intercambiador E-6
ff[:, 15] == f[:, 14]
## Mezclador M1
ff[:, 1] + f[:, 25] + f[:, 14] == f[:, 16]
## Intercambiador E-7
f[:, 16] == f[:, 2]
## Reactor R1 adiabático
f[:, 3] == f[:, 2] + ν*ε
χ_R1*f[2, 2] == f[2, 2] - f[2, 3]
χ_R2*f[3, 2] == f[3, 2] - f[3, 3]
## Intercambiador E-8
f[:, 3] == f[:, 17]
## Destilador T1
f[:, 17] == f[:, 5] + f[:, 4]
f[1, 4] == 0
f[2, 4] == 0
LK
sustancias = ["nitrogeno""; "etileno"; "acetileno"; "acetaldehido"; "etanol"; "agua"]  # HK
f[3, 4] == f[3, 17]*α
f[4, 5] == f[4, 17]*α
f[5, 5] == 0
f[6, 5] == 0
## Splitter X1
f[:, 5] == f[:, 6] + f[:, 7]
f[:, 6] == β*f[:, 5]
## Compresor C1
f[:, 7] == f[:, 25]
## Intercambiador E-9
f[:, 4] == f[:, 18]
## Destilador T2
f[:, 18] == f[:, 9] + f[:, 8]
f[1, 8] == 0
f[2, 8] == 0
sustancias = ["nitrogeno""; "etileno"; "acetileno"; "acetaldehido"; "etanol"; "agua"]
f[3, 8] == 0
LK
f[4, 8] == 0
HK
f[5, 8] == α*f[5, 18]
f[6, 9] == α*f[6, 18]
## Intercambiador E-10
f[:, 9] == f[:, 19]
## Destilador T3
f[:, 19] == f[:, 11] + f[:, 10]
f[1, 10] == 0
f[2, 10] == 0
sustancias = ["nitrogeno""; "etileno"; "acetileno"; "acetaldehido"; "etanol"; "agua"]  # LK
HK
f[3, 10] == α*f[3, 19]
f[4, 11] == α*f[4, 19]
f[5, 11] == 0
f[6, 11] == 0
## Intercambiador E-11
f[:, 10] == f[:, 20]
## Destilador T4
f[:, 20] == f[:, 13] + f[:, 12]
f[1, 12] == 0
f[2, 12] == 0
sustancias = ["nitrogeno""; "etileno"; "acetileno"; "acetaldehido"; "etanol"; "agua"]
f[3, 12] == 0
LK
f[4, 12] == 0
HK
f[5, 12] == α*f[5, 20]
f[6, 13] == α*f[6, 20]
## Intercambiador E-12
f[:, 11] == f[:, 21]
## Intercambiador E-13
f[:, 13] == f[:, 22]
## Intercambiador E-14
f[:, 12] == f[:, 23]
## Intercambiador E-15
f[:, 8] == f[:, 24]
[f(β); ε(β)] := Find(f, ε)
f(β) = [
    0.1, 0.5, 0.5, 0, 0.5, 0.1, 0.4, 0, 0, 0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;
    97, 121.25, 30.3125, 0, 30.3125, 6.0625, 24.25, 0, 0, 0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;
    2.9, 4.10207, 1.51777, 0.0151777, 1.50259, 0.300518, 1.20207, 0, 0.0151777, 0.000151777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;
    0, 0.0208412, 2.60515, 2.57909, 0.0260515, 0.00521029, 0.0208412, 0, 2.57909, 2.5533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;
    0, 0, 90.9375, 90.9375, 0, 0, 0, 0.909375, 90.0281, 90.0281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;
    0, 120, 26.4782, 26.4782, 0, 0, 0, 26.2134, 0.264782, 0.264782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]
ε(β) = [90.9375; 2.5843]
f(β) :=
    f ← f(β)
    f*mol/hr  # disabled
F(β) :=
    f ← f(β)
    for i ∈ 1 .. N_c
        for j ∈ 1 .. N_s
            F[j] ← sum(f[i, j], i = 1 .. N_c)
    F
w(β) :=
    f ← f(β)
    for i ∈ 1 .. N_c
        for j ∈ 1 .. N_s
            w[i, j] ← f[i, j]*PM[i]
    w
W(β) :=
    w ← w(β)
    for i ∈ 1 .. N_c
        for j ∈ 1 .. N_s
            W[j] ← sum(w[i, j], i = 1 .. N_c)
    W
x(β) :=
    f ← f(β)
    for i ∈ 1 .. N_c
        for j ∈ 1 .. N_s
            x[i, j] ← f[i, j]/sum(f[i, j], i = 1 .. N_c)
    x
%P(β) :=
    w ← w(β)
    for i ∈ 1 .. N_c
        for j ∈ 1 .. N_s
            %P[i, j] ← w[i, j]/sum(w[i, j], i = 1 .. N_c)
    %P
## Consistencia BM
(W(0.2)[1] + W(0.2)[15]) - (W(0.2)[6] + W(0.2)[24] + W(0.2)[21] + W(0.2)[22] + W(0.2)[23]) = 9.09495e-13
## Datos para balance de energía
# T = 0 // Temp desconocida
#
# Fase α = 1 gas
# α = 0 Liq
# α = -1 Desconocido
Datos := [
    298, 5.1, 1;
    450, 5, -1;
    0, 5, -1;
    298, 1.4, 0;
    298, 1.4, 1;
    298, 1.4, 1;
    298, 1.4, 1;
    342, 1.3, 0;
    332, 1.3, 0;
    397, 1.2, 0;
    340, 1.2, 0;
    540, 1.1, 0;
    420, 1.1, 0;
    430, 5, -1;
    298, 5.1, 0;
    0, 5, -1;
    298, 1.4, 0;
    320, 1.3, -1;
    386, 1.2, -1;
    538, 1.1, -1;
    298, 1, 0;
    298, 1, 0;
    298, 1, 0;
    298, 1, -1;
    298, 5.1, -1
]
T := Datos[:, 1]
P := Datos[:, 2]
α := Datos[:, 3]
## Cálculo punto de burbuja y rocío
EaE(a, b) :=
    for i ∈ 1 .. rows(a)
        c[i] ← a[i]*b[i]
    c
K_LV(x, y, T, P) := ϕ_L.PR(x, T, P, T_c, P_c, ω)/ϕ_V.PR(y, T, P, T_c, P_c, ω)
# Calculo del punto burbuja:
# X,P// datos; Y,T// incognitas
Given
Y == EaE(K_LV(X, Y, T, P), X)
sum(Y) == 1
Sol(X, P, Y, T) := Find(Y, T)
y_Burb(X, P, Y, T) := Sol(X, P, Y, T)[1]
T_Burb(X, P, Y, T) := Sol(X, P, Y, T)[2]
# Calculo de punto rocío:
# Y,P son dato
# X,T incognitas
Given
Y == EaE(K_LV(X, Y, T, P), X)
sum(X) == 1
Sol(Y, P, X, T) := Find(X, T)
x_rocio(Y, P, X, T) := Sol(Y, P, X, T)[1]
T_rocio(Y, P, X, T) := Sol(Y, P, X, T)[2]
# Calculo de α para una mezcla en eq:
# Zm, T.eq, P // Dato
# X,Y,α // Incognitas
Given
z == (1 - α)*X + α*Y
Y == EaE(K_LV(X, Y, T, P), X)
sum(Y) == 1
sum(X) == 1
Sol(z, T, P, X, Y, α) := Find(X, Y, α)
x_flash(z, T, P, X, Y, α) := Sol(z, T, P, X, Y, α)[1]
y_flash(z, T, P, X, Y, α) := Sol(z, T, P, X, Y, α)[2]
α_flash(z, T, P, X, Y, α, T_B, T_R) := if(T < T_B, 0, if(T > T_R, 1, Sol(z, T, P, X, Y, α)[3]))
## Tenemos que averiguar el estado térmico de la corriente 2, 3, 14, 16, 17, 19, 20, 24 y 25
## Corriente F7
T[7] = 298
P[7] = 1.4
α[7] := 1
## Corriente F25
T[25] = 298
P[25] = 5.1
α[25] := 1
T_B[25] := T_Burb(x(0.2)[:, 25], P[25], x(0.2)[:, 25], T_b*x(0.2)[:, 25]) = 182.063
T_R[25] := T_rocio(x(0.2)[:, 25], P[25], x(0.2)[:, 25], T_b*x(0.2)[:, 25]) = 210.525
# La T>Tr por lo tanto es gaseosa
α[25] := 1
## Corriente F14
T[14] = 430
P[14] = 5
T_B[14] := T_Burb(x(0.2)[:, 14], P[14], x(0.2)[:, 14], T_b*x(0.2)[:, 14]) = 425.504
T_R[14] := T_rocio(x(0.2)[:, 14], P[14], x(0.2)[:, 14], T_b*x(0.2)[:, 14]) = 425.504
# La T>Tr por lo tanto es gaseosa
α[14] := 1
## Corriente F16
T[16] = 0
P[16] = 5
T_B[16] := T_Burb(x(0.2)[:, 16], P[25], x(0.2)[:, 16], T_b*x(0.2)[:, 16]) = 72.8522
T_R[16] := T_rocio(x(0.2)[:, 16], P[25], x(0.2)[:, 16], T_b*x(0.2)[:, 16]) = 76.5842
# La T>Tr por lo tanto es gaseosa
# No temos la T16 pero es de esperarse que seaz gaseosa ya que venimos de temperaturas muy altas
Given
T_i := 130
f(0.2)[:, 1]*H(T[1], P[1], x(0.2)[:, 1]) + f(0.2)[:, 14]*H(T[14], P[14], x(0.2)[:, 14]) + f(0.2)[:, 25]*H(T[25], P[25], x(0.2)[:, 25]) - f(0.2)[:, 16]*H(T_i, P[16], x(0.2)[:, 16]) == 0
Find(T_i) = 353.008
α[16] := 1
## Corriente 3
T[3] = 0
P[3] = 5
α[3] = -1
T_B[3] := T_Burb(x(0.2)[:, 3], P[3], x(0.2)[:, 3], T_b*x(0.2)[:, 3]) = 218.583
T_R[3] := T_rocio(x(0.2)[:, 3], P[3], x(0.2)[:, 3], T_b*x(0.2)[:, 3]) = 519.298
f(0.2)[:, 2]*H(T[2], P[2], x(0.2)[:, 2]) - (f(0.2)[:, 3]*((1 - α_flash(x(0.2)[:, 3], T_i, P[3], [0; 0; 0; 0; 0; 1], [1; 0; 0; 0; 0; 0], 0.5, T_B[3], T_R[3]))*h(T_i, P[3], x(0.2)[:, 3]) + α_flash(x(0.2)[:, 3], T_i, P[3], [0; 0; 0; 0; 0; 1], [1; 0; 0; 0; 0; 0], 0.5, T_B[3], T_R[3])*H(T_i, P[3], x(0.2)[:, 3])), T_i, 200, 900) =  # error: This value must be a scalar.
# si asumimos que la mezcla es gaseosa:
T_i := 370
T[3] := root(f(0.2)[:, 2]*H(T[2], P[2], x(0.2)[:, 2]) - f(0.2)[:, 3]*H(T_i, P[3], x(0.2)[:, 3]), T_i, 200, 900)
T[3] = 794.852
## Corriente 17
T[17] = 298
P[17] = 1.4
α[17] = 0
T_B[17] := T_Burb(x(0.2)[:, 17], P[17], x(0.2)[:, 17], T_b*x(0.2)[:, 17]) = 73.6084
T_R[17] := T_rocio(x(0.2)[:, 17], P[17], x(0.2)[:, 17], T_b*x(0.2)[:, 17]) = 349.236
# La T está dentro de Tburb y Troc por lo tanto se encuentra en equilibrio liquido vapor
α_flash(x(0.2)[:, 17], T[17], P[17], [0; 0; 0; 0; 1; 0], [0; 1; 0; 0; 0; 0], 0.5, T_B[17], T_R[17]) = 0.229039
x(0.2)[:, 17] = [0.00328189; 0.198965; 0.00996229; 0.0170996; 0.596894; 0.173797]
# tengo mas de este
α[17] := 0.229
## Corriente 19
T[19] = 386
P[19] = 1.2
α[19] = -1
T_B[19] := T_Burb(x(0.2)[:, 19], P[19], x(0.2)[:, 19], T_b*x(0.2)[:, 19]) = 350.558
T_R[19] := T_rocio(x(0.2)[:, 18], P[19], x(0.2)[:, 18], T_b*x(0.2)[:, 19]) = 351.546
α[19] == 1
## Corriente 20
T[20] = 538
P[20] = 1.1
α[20] = -1
T_B[20] := T_Burb(x(0.2)[:, 20], P[20], x(0.2)[:, 20], T_b*x(0.2)[:, 20]) = 348.709
T_R[20] := T_rocio(x(0.2)[:, 20], P[20], x(0.2)[:, 20], T_b*x(0.2)[:, 20]) = 352.024
α[20] == 1
## Corriente 24
T[24] = 298
P[24] = 1
α[24] = -1
T_B[24] := T_Burb(x(0.2)[:, 24], P[24], x(0.2)[:, 24], T_b*x(0.2)[:, 24]) = 311.461
T_R[24] := T_rocio(x(0.2)[:, 24], P[24], x(0.2)[:, 24], T_b*x(0.2)[:, 24]) = 373.239
α[24] == 1  # es liquida ya que la T es menor a la de burbuja
## Flujo intercambiador E6
Q_E6 := f(0.2)[:, 14]*H(T[14], P[14], x(0.2)[:, 14]) - f(0.2)[:, 15]*H(T[15], P[15], x(0.2)[:, 15])
Q_E6 = 567797
## Flujo intercambiador E6
Q_E6 := f(0.2)[:, 17]*((1 - α[17])*h(T[17], P[17], x(0.2)[:, 17]) + α[17]*H(T[17], P[17], x(0.2)[:, 17])) - f(0.2)[:, 3]*H(T[3], P[3], x(0.2)[:, 3])
Q_E6 = -10060198  # se está enfriando (extrae energia)
β_r := 0, 0.05 .. 1
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f(0.2)[:, 23] = [0; 0; 0; 0; 0.900281; 0.262134]
f(0.2)[:, 24] = [0; 0; 0; 0; 0.909375; 26.2134]
f(0.2)[:, 6] = [0.1; 6.0625; 0.300518; 0.00521029; 0; 0]
f(0.2)[:, 21] = [0; 0; 0.0150259; 0.0257909; 0; 0]
