# Worksheet setting: ORIGIN = 1
ORIGIN ≡ 1
# Monoxido : 81.7
# Acetaldehido: 293.55
# metanol : 337.85
# Agua: 373.15
# Ac Acetico: 391.05
Sustancias := ["CO"; "Acetaldehído"; "Metanol"; "Agua"; "Ac. Acético"]
T_b := [81.7; 293.55; 337.85; 373.15; 391.05]
T_c := [132.92; 461; 512.58; 647.13; 592.71]
P_c := [34.99; 55.5; 80.96; 220.55; 57.86]
ω := [0.066; 0.317; 0.566; 0.345; 0.462]
PM := [28.01; 44.053; 32.042; 18.015; 60.053]
Coef_Cp := [
    29.556, -0.00658, 2.013e-5, -1.223e-8, 2.2617e-12;
    34.14, 0.04002, 0.00015634, -1.644e-7, 4.7248e-11;
    40.046, -0.03829, 0.00024529, -2.168e-7, 5.9909e-11;
    33.933, -0.0084186, 0.000029906, -1.7825e-8, 3.6934e-12;
    34.85, 0.03763, 0.00028311, -3.077e-7, 9.2646e-11
]
Cp_g(T) := Coef_Cp*[1; T; T^2; T^3; T^4]  # kJ/kmol
Coef_Hf := [
    -112.56, 0.0092553, -7.8431e-6;
    -154.390, -0.045870, 2.0939e-5;
    -187.990, -0.049757, 2.1603e-5;
    -238.410, -0.012256, 2.7656e-6;
    -417.910, -0.058243, 3.3466e-5
]
H_f(T) := Coef_Hf*[1; T; T^2]  # asi nos queda  # J/mol
H_id(T) := H_f(T) + Coef_Cp*[T; T^2/2; T^3/3; T^4/4; T^5/5] - Coef_Cp*[298; 298^2/2; 298^3/3; 298^4/4; 298^5/5]
# [reference: PR.xmcdz]
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H(T, P, y) := H_id(T) + H_exc.PR(y, T, P, T_c, P_c, ω)
h(T, P, x) := H_id(T) + h_exc.PR(x, T, P, T_c, P_c, ω)
N_c := 5
N_s := 12
i := 1 .. N_c
j := 1 .. N_s
g(x, y) := 1
f := matrix(N_c, N_s, g)
# Datos
## Mezclador
F_1 := 100  # kmol/hr
x[:, 1] := [0; 0; 0.95; 0.05; 0]
f[:, 1] := F_1*x[:, 1]
Sustancias = ["CO"; "Acetaldehído"; "Metanol"; "Agua"; "Ac. Acético"]
F_2 := 120  # kmol/hr
x[:, 2] := [0.9; 0; 0; 0.1; 0]
f[:, 2] := F_2*x[:, 2]
## Reactor
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ν := [-1, -1; 0, 2; -1, -3; 0, 2; 1, 0]
Sustancias = ["CO"; "Acetaldehído"; "Metanol"; "Agua"; "Ac. Acético"]
|f[3, 1]/(ν[3, 1] + ν[3, 2])| = 23.75  # El metanol es el react limitante
|f[1, 2]/(ν[1, 1] + ν[1, 2])| = 54
χ_3 := 0.935
S_52 := 5
# Torres de destilacion
HK := 0.05
LK := 0.01
β := 0.38
## Resolucion del BM
ff := f
ε := [1; 1]
Given
## IC 1
ff[:, 1] == f[:, 3]
## IC 2
ff[:, 2] == f[:, 4]
## Mezclador
f[:, 3] + f[:, 4] + f[:, 12] == f[:, 5]  # SACAR FF
## Reactor
f[:, 6] == f[:, 5] + ν*ε
χ_3*f[3, 5] == f[3, 5] - f[3, 6]
S_52 == f[5, 6]/f[2, 6]
## IC 3
f[:, 6] == f[:, 7]
## Torre
f[:, 7] == f[:, 8] + f[:, 9]
f[1, 8] == 0
f[2, 8] == 0
Sustancias = ["CO"; "Acetaldehído"; "Metanol"; "Agua"; "Ac. Acético"]  # LK
f[3, 8] == 0  # HK
f[4, 8] == LK*f[4, 7]
f[5, 9] == HK*f[5, 7]
## Separador
f[:, 9] == f[:, 10] + f[:, 11]
f[:, 10] == β*f[:, 9]
## IC 4
f[:, 11] == f[:, 12]
[f(β); ε(β)] := Find(f, ε)
β_1 := 0.38
ε(β_1) = [82.8123; 3.24754]
f(β_1) = [
    0, 108, 0, 108, 143.797, 57.7372, 57.7372, 0, 57.7372, 21.9401, 35.797, 35.797;
    0, 0, 0, 0, 10.5972, 17.0923, 17.0923, 0, 17.0923, 6.49509, 10.5972, 10.5972;
    95, 0, 95, 0, 98.9893, 6.4343, 6.4343, 0, 6.4343, 2.44503, 3.98927, 3.98927;
    5, 12, 5, 12, 54.3415, 60.8366, 60.8366, 0.608366, 60.2282, 22.8867, 37.3415, 37.3415;
    0, 0, 0, 0, 2.64931, 85.4616, 85.4616, 81.1886, 4.27308, 1.62377, 2.64931, 2.64931
]
F(β) :=
    f ← f(β)
    for i ∈ 1 .. N_c
        for j ∈ 1 .. N_s
            F[j] ← sum(f[i, j], i = 1 .. N_c)
    F
w(β) :=
    f ← f(β)
    for i ∈ 1 .. N_c
        for j ∈ 1 .. N_s
            w[i, j] ← f[i, j]*PM[i]
    w
W(β) :=
    w ← w(β)
    for i ∈ 1 .. N_c
        for j ∈ 1 .. N_s
            W[j] ← sum(w[i, j], i = 1 .. N_c)
    W
x(β) :=
    f ← f(β)
    for i ∈ 1 .. N_c
        for j ∈ 1 .. N_s
            x[i, j] ← f[i, j]/sum(f[i, j], i = 1 .. N_c)
    x
%P(β) :=
    w ← w(β)
    for i ∈ 1 .. N_c
        for j ∈ 1 .. N_s
            %P[i, j] ← w[i, j]/sum(w[i, j], i = 1 .. N_c)
    %P
## Consistencia del BM
β := 0.38
W(β)[1] + W(β)[2] - W(β)[8] - W(β)[10] = -0.0828123
## Balance de energia
T := [298; 298; 175 + 273; 175 + 273; 175 + 273; 175 + 273; 105 + 273; 0; 0; 0; 0; 175 + 273]
P := [1; 1; 1; 1; 1; 1; 1; 1; 1; 1; 1; 1]
α := [0; 1; -1; -1; -1; -1; -1; 0; 0; 0; 0; -1]
# 1= gas
# 0= liq
# -1= desconocido
EaE(a, b) :=
    for i ∈ 1 .. rows(a)
        c[i] ← a[i]*b[i]
    c
K_LV(x, y, T, P) := ϕ_L.PR(x, T, P, T_c, P_c, ω)/ϕ_V.PR(y, T, P, T_c, P_c, ω)
# Calculo Punto burbuja
# X.P // dato
# Y,T // incog
Given
Y == EaE(K_LV(X, Y, T, P), X)
sum(Y) == 1
Sol(X, P, Y, T) := Find(Y, T)
y_Burb(X, P, Y, T) := Sol(X, P, Y, T)[1]
T_Burb(X, P, Y, T) := Sol(X, P, Y, T)[2]
# Calculo Punto Rocio
# Y,P // dato
# X,T // Incog
Given
Y == EaE(K_LV(X, Y, T, P), X)
sum(X) == 1
Sol_1(Y, P, X, T) := Find(X, T)
x_roc(Y, P, X, T) := Sol_1(Y, P, X, T)[1]
T_roc(Y, P, X, T) := Sol_1(Y, P, X, T)[2]
# Calculo equilibrio LV
# z,T,P // dato
# X,Y,α // incog
Given
Y == EaE(K_LV(X, Y, T, P), X)
sum(X) == 1
sum(Y) == 1
z == (1 - α)*X + α*Y
Sol_2(z, T, P, X, Y, α) := Find(X, Y, α)
x_flash(z, T, P, X, Y, α) := Sol_2(z, T, P, X, Y, α)[1]
y_flash(z, T, P, X, Y, α) := Sol_2(z, T, P, X, Y, α)[2]
α_flash(z, T, P, X, Y, α, T_B, T_R) := if(T < T_B, 0, if(T > T_R, 1, Sol_2(z, T, P, X, Y, α)[3]))
## Calculo del estado térmico de cada corriente
## Corriente 1
T[1] = 298
P[1] = 1
α[1] = 0
## Corriente 2
T[2] = 298
P[2] = 1
α[2] = 1
## Corriente 3
T[3] = 448
P[3] = 1
α[3] = -1
T_B[3] := T_Burb(x(β_1)[:, 3], P[3], x(β_1)[:, 3], T_b*x(β_1)[:, 3]) = 337.689
T_R[3] := T_roc(x(β_1)[:, 3], P[3], x(β_1)[:, 3], T_b*x(β_1)[:, 3]) = 337.746
α[3] := 1
## Corriente 4
T[4] = 448
P[4] = 1
α[4] = -1
x(β_1)[:, 4] = [0.9; 0; 0; 0.1; 0]
T_B[4] := T_Burb(x(β_1)[:, 4], P[3], x(β_1)[:, 4], T_b*x(β_1)[:, 4]) = 79.7751
T_R[4] := T_roc(x(β_1)[:, 4], P[4], x(β_1)[:, 4], 105) = 158.141
## Corriente 5
T[5] = 448
P[5] = 1
α[5] = -1
T_B[5] := T_Burb(x(β_1)[:, 5], P[5], x(β_1)[:, 5], T_b*x(β_1)[:, 5]) = 395.211
T_R[5] := T_roc(x(0.38)[:, 5], P[5], x(0.38)[:, 5], T_b*x(0.38)[:, 5]) = 418.784
α[5] := 1
## Corriente 6
T[6] = 448
P[6] = 1
α[6] = -1
T_B[6] := T_Burb(x(β_1)[:, 6], P[6], x(β_1)[:, 6], T_b*x(β_1)[:, 6]) = 525.054
T_R[6] := T_roc(x(β_1)[:, 6], P[6], x(β_1)[:, 6], 210) = 556.044
α[6] := 0
## Corriente 7
T[7] = 378
P[7] = 1
α[7] = -1
# El equipo enfría una corriente líquida
α[7] := 0
## Corriente 8
T[8] = 0
P[8] = 1
α[8] = 0
T[8] := T_Burb(x(β_1)[:, 8], P[8], x(β_1)[:, 8], T_b*x(β_1)[:, 8]) = 390.525
## Corriente 9
T[9] = 0
P[9] = 1
α[9] = 0
x(β_1)[:, 9] = [0.396097; 0.117259; 0.0441416; 0.413187; 0.0293149]
T[9] := T_Burb(x(β_1)[:, 9], P[9], x(β_1)[:, 9], T_b*x(β_1)[:, 9]) = 357.606
## Corriente 10
T[10] = 0
P[10] = 1
α[10] = 0
T[10] := T[9]
## Corriente 11
T[11] = 0
P[11] = 1
α[11] = 0
T[11] := T[9]
## Corriente 12
T[12] = 448
P[12] = 1
α[12] = -1
T_B[12] := T_Burb(x(β_1)[:, 12], P[12], x(β_1)[:, 12], T_b*x(β_1)[:, 12]) = 357.606
T_R[12] := T_roc(x(β_1)[:, 12], P[12], x(β_1)[:, 12], 220) = 384.334
α[12] := 1
## Calores en los IC y Reactor
Q_1(β_1) := f(β_1)[:, 3]*H(T[3], 1, x(β_1)[:, 3]) - f(β_1)[:, 1]*h(T[3], 1, x(β_1)[:, 1])  # error: Evaluation not allowed in this definition.
# Q1 ingresa
Q_2 := f(β_1)[:, 4]*H(x(β)[:, 4], T[4], P[4]) - f(β)[:, 2]*H(x(β)[:, 2], T[2], P[2])
# Q2 ingresa
H(x(β)[:, 4], T[4], P[4]) =  # error: This value must be a matrix of scalar elements.
Q_R := f(β_1)[:, 6]*h(x(β_1)[:, 6], T[6], P[6]) - f(β_1)[:, 5]*H(x(β_1)[:, 5], T[5], P[5])
H(x(β)[:, 4], T[4], 1) =  # error
# Debo sacarle Calor al reactor para q trabaje de manera isotermica
Q_3 := f(β_1)[:, 7]*h(x(β_1)[:, 7], T[7], P[7]) - f(β_1)[:, 6]*h(x(β_1)[:, 6], T[6], P[6])
# Q3 sale
Q_4 := f(β_1)[:, 12]*H(x(β_1)[:, 12], T[12], P[12]) - f(β_1)[:, 11]*h(x(β_1)[:, 11], T[11], P[11])
# Q4 ingresa
Q_R(β) := f(β)[:, 6]*H(x(β)[:, 6], T[6], P[6]) - f(β)[:, 5]*H(x(β)[:, 5], T[5], P[5])
β_r := 0, 0.1 .. 1
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# A medida que aumento la purga la cantidad de Q que tengo que remover es menor, ya que se recircula menos reactvo y por ende la reaccion será menos exotermica
## Servicios auxiliares
F_E := ["F1"; "F2"; "F6"; "F11"]
F_S := ["F3"; "F4"; "F7"; "F12"]
# 1 = Cold. Se calienta
# -1 = Hot. Se enfria
T_E := [T[1]; T[2]; 448; T[11]] = [298; 298; 448; 357.606]
T_S := [T[3]; T[4]; T[7]; T[12]] = [448; 448; 378; 448]
Tipo := [1; 1; -1; 1]
H_E := [
    f(β)[:, 1]*h(x(β)[:, 1], T[1], P[1]);
    f(β)[:, 2]*H(x(β)[:, 2], T[2], P[2]);
    f(β)[:, 6]*h(x(β)[:, 6], 448, P[6]);
    f(β)[:, 11]*h(x(β)[:, 11], T[11], P[11])
]
H_S := [
    f(β)[:, 3]*H(x(β)[:, 3], T[3], P[3]);
    f(β)[:, 4]*H(x(β)[:, 4], T[4], P[4]);
    f(β)[:, 7]*H(x(β)[:, 7], T[7], P[7]);
    f(β)[:, 12]*H(x(β)[:, 12], T[12], P[12])
]
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CP := (H_S - H_E)/(T_S - T_E)  # error: This variable is undefined.
CP := [3.192*10^4; 3.583*10^3; 9.216*10^4; 3.465*10^3]
ΔT_min := 10  # K
S_E := T_E + Tipo*ΔT_min/2 = [303; 303; 443; 362.606]
S_S := T_S + Tipo*ΔT_min/2 = [453; 453; 373; 453]
T_min := 303
T_max := 453
ΔT := 1
N_corrientes := 4
N := (T_max - T_min)/ΔT + 1 = 151
i := 1 .. N
T[i] := T_min + (T_max - T_min)/(N - 1)*(i - 1)
GCC(H0) :=
    T[1] ← T_min
    H[1] ← H0
    for i ∈ 1 .. N - 1
        H[i + 1] ← H[i]
        for j ∈ 1 .. N_corrientes
            if Tipo[j] == 1
                H[i + 1] ← H[i + 1] + CP[j]*ΔT if (T[i] ≥ S_E[j]) and (T[i] < S_S[j])
            if Tipo[j] == -1
                H[i + 1] ← H[i + 1] - CP[j]*ΔT if (T[i] ≥ S_S[j]) and (T[i] < S_E[j])
        T[i + 1] ← T[i] + ΔT
    H
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a := -min(GCC(0)) = 1203580
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T_pinch := T[match(0, GCC(a))[1]] = 443  # K
Req_Calef := GCC(a)[N]*J/hr = 108.244 W
Req_Ref := GCC(a)[1]*J/hr = 334.328 W
