ORIGIN ≡ 1
Sustancias := ["H2O"; "Al2O3"; "H2SO4"; "Al2(SO4)3"]
PM := [18; 102; 98; 342] = [18; 102; 98; 342]
N_c := 4
N_s := 8
i := 1 .. N_c
j := 1 .. N_s
g(x, y) := 10000
f := matrix(N_c, N_s, g)
f = [
    10000, 10000, 10000, 10000, 10000, 10000, 10000, 10000;
    10000, 10000, 10000, 10000, 10000, 10000, 10000, 10000;
    10000, 10000, 10000, 10000, 10000, 10000, 10000, 10000;
    10000, 10000, 10000, 10000, 10000, 10000, 10000, 10000
]
# Datos
# Mezclador
Sustancias = ["H2O"; "Al2O3"; "H2SO4"; "Al2(SO4)3"]
F_1 := 550  # kmol/hr
x[:, 1] := [0; 1; 0; 0]
f[:, 1] := F_1*x[:, 1]
x[:, 2] := [0.02; 0; 0.98; 0]
R_molar := 0.05
# Reactor
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ν := [3; -1; -3; 1]
Sustancias = ["H2O"; "Al2O3"; "H2SO4"; "Al2(SO4)3"]
ε := 1
χ_3 := 0.94
# Filtro
Hum := 0.1
Retencion := 0.93
# Splitter
β := 0.1
# Resolución
ff := f
Given
# Mezclador
ff[:, 1] + f[:, 2] + f[:, 8] == f[:, 3]
f[:, 2] == x[:, 2]*sum(f[:, 2])
R_molar*f[2, 3] == f[3, 3]
# Reactor
f[:, 4] == f[:, 3] + ν*ε
χ_3*f[3, 3] == f[3, 3] - f[3, 4]
# Filtro
f[:, 4] == f[:, 5] + f[:, 6]
Hum*(f[4, 6]*PM[4]) == f[1, 6]*PM[1]
f[2, 5]*sum(f[i, 6], i = 1 .. 3) == f[2, 6]*sum(f[i, 5], i = 1 .. 3)
f[3, 5]*sum(f[i, 6], i = 1 .. 3) == f[3, 6]*sum(f[i, 5], i = 1 .. 3)
f[4, 6] == 0.93*f[4, 4]
# Splitter
f[:, 5] == f[:, 7] + f[:, 8]
f[:, 7] == β*f[:, 5]
[f(β); ε(β)] := Find(f, ε)
f(0.1) = [
    0, 2.26258, 387.975, 497.276, 428.569, 68.7071, 42.8569, 385.712;
    550, 0, 2325.56, 2289.13, 1972.85, 316.282, 197.285, 1775.56;
    0, 110.867, 116.278, 6.97669, 6.01274, 0.963946, 0.601274, 5.41147;
    0, 0, 2.44966, 38.8835, 2.72184, 36.1616, 0.272184, 2.44966
]
ε(0.1) = 36.4338
F(β) :=
    f ← f(β)
    for i ∈ 1 .. N_c
        for j ∈ 1 .. N_s
            F[j] ← sum(f[i, j], i = 1 .. N_c)
    F
x(β) :=
    f ← f(β)
    F ← F(β)
    for i ∈ 1 .. N_c
        for j ∈ 1 .. N_s
            x[i, j] ← f[i, j]/F[j]
    x
w(β) :=
    f ← f(β)
    for i ∈ 1 .. N_c
        for j ∈ 1 .. N_s
            w[i, j] ← f[i, j]*PM[i]
    w
W(β) :=
    w ← w(β)
    for i ∈ 1 .. N_c
        for j ∈ 1 .. N_s
            W[j] ← sum(w[i, j], i = 1 .. N_c)
    W
%P(β) :=
    w ← w(β)
    W ← W(β)
    for i ∈ 1 .. N_c
        for j ∈ 1 .. N_s
            %P[i, j] ← w[i, j]/W[j]
    %P
W(β)[1] + W(β)[2] - W(β)[6] - W(β)[7] = 0
w(1)[4, 6] = 2740.62
W(1)[6] = 34942
w(0.1)[4, 6] = 12367.3
W(0.1)[6] = 45959.2
β_r := 0, 0.1 .. 1
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%P(1) = [
    0, 0.00373444, 0.000171789, 0.00808437, 0.0084373, 0.00784334, 0.0084373, -0.0196958;
    1, 0, 0.953999, 0.939053, 0.980048, 0.911056, 0.980048, 1.02875;
    0, 0.996266, 0.0458294, 0.00274976, 0.00286981, 0.00266778, 0.00286981, -0.00423139;
    0, 0, -1.66553e-12, 0.050113, 0.00864443, 0.0784334, 0.00864443, -0.00481938
]
%P(0.1) = [
    0, 0.00373444, 0.0272344, 0.0349069, 0.0366534, 0.0269093, 0.0366534, 0.0366534;
    1, 0, 0.925059, 0.910567, 0.956124, 0.701943, 0.956124, 0.956124;
    0, 0.996266, 0.0444391, 0.00266635, 0.00279975, 0.00205545, 0.00279975, 0.00279975;
    0, 0, 0.00326718, 0.05186, 0.00442293, 0.269093, 0.00442293, 0.00442293
]
