# Worksheet setting: ORIGIN = 1
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N_c := 7
N_s := 8
g(x, y) := 1
i := 1 .. N_c
j := 1 .. N_s
PM := [18.02; 97.56; 98.08; 159.5; 40; 142.04; 249.69]*gm/mol
sustancias := ["H2O"; "Cu(OH)2"; "H2SO4"; "CuSO4"; "Na(OH)"; "Na2SO4"; "SO4Cu*5H2O(s)""]
f := matrix(N_c, N_s, g)
## Datos
kmol := 1000 mol
F_1 := 100
R_molar := 2.1
x[:, 1] := [1 - 0.028 - 1.8*10^-5; 0.028; 0; 0; 1.8*10^-5; 0; 0]
x[:, 2] := [1 - 0.102; 0; 0.102; 0; 0; 0; 0]
f[:, 1] := F_1*x[:, 1]
## Reactor
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sustancias = ["H2O"; "Cu(OH)2"; "H2SO4"; "CuSO4"; "Na(OH)"; "Na2SO4"; "SO4Cu*5H2O(s)""]
ν_1 := [2, 2; -1, 0; -1, -1; 1, 0; 0, -2; 0, 1; 0, 0]
χ_2 := 1
χ_5 := 1
ε_1 := [1; 1]
## Parametros del evaporador
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ε_2 := [1]
χ_4 := 0.5
x[:, 6] := [1; 0; 0; 0; 0; 0; 0]
ν_2 := [-5; 0; 0; -1; 0; 0; 1]
γ := 0.5
## Parametros del filtro
Hum := 0.1
## RESOLUCIÓN
ff[:, 1] := f[:, 1]
Given
## Mezclador
ff[:, 1] + f[:, 2] == f[:, 3]
f[:, 2] == x[:, 2]*sum(f[:, 2])
f[3, 3] == R_molar*(f[2, 3] + f[5, 3])
## Reactor
f[:, 4] == f[:, 3] + ν_1*ε_1
χ_2 == (f[2, 3] - f[2, 4])/f[2, 3]
χ_5 == (f[5, 3] - f[5, 4])/f[5, 3]
## Evaporador
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f[:, 5] + f[:, 6] == f[:, 4] + ν_2*ε_2
χ_4 == (f[4, 4] - (f[4, 5] + f[4, 6]))/f[4, 4]
f[:, 6] == x[:, 6]*sum(f[:, 6])
f[1, 6] == γ*f[1, 4]
## Filtro
f[:, 5] == f[:, 8] + f[:, 7]
Hum == f[1, 7]*PM[1]/(f[7, 7]*PM[7])
0.95*f[7, 5] == f[7, 7]
f[2, 8]*sum(f[i, 7], i = 1 .. 6) == f[2, 7]*sum(f[i, 8], i = 1 .. 6)
f[3, 8]*sum(f[i, 7], i = 1 .. 6) == f[3, 7]*sum(f[i, 8], i = 1 .. 6)
f[4, 8]*sum(f[i, 7], i = 1 .. 6) == f[4, 7]*sum(f[i, 8], i = 1 .. 6)
f[5, 8]*sum(f[i, 7], i = 1 .. 6) == f[5, 7]*sum(f[i, 8], i = 1 .. 6)
f[6, 8]*sum(f[i, 7], i = 1 .. 6) == f[6, 7]*sum(f[i, 8], i = 1 .. 6)
[f; ε_1; ε_2] := Find(f, ε_1, ε_2)
f = [
    97.1982, 51.8003, 148.999, 154.6, 70.3002, 77.3002, 1.84288, 68.4573;
    2.8, 0, 2.8, 3.15313e-9, 3.33043e-9, 0, 9.18442e-11, 3.41177e-9;
    0, 5.88378, 5.88378, 3.08288, 3.08288, 0, 0.0808162, 3.00206;
    0, 0, 0, 2.8, 1.4, 0, 0.0367003, 1.3633;
    0.0018, 0, 0.0018, -2.39456e-12, -2.40295e-12, 0, 0, -2.34794e-12;
    0, 0, 0, 0.0009, 0.0009, 0, 2.35931e-5, 0.000876407;
    0, 0, 0, 0, 1.4, 0, 1.33, 0.07
]
f :=
    f ← f
    f*kmol/hr
F :=
    f ← f
    for i ∈ 1 .. N_c
        for j ∈ 1 .. N_s
            F[j] ← sum(f[i, j], i = 1 .. N_c)
    F
X :=
    f ← f
    F ← F
    for i ∈ 1 .. N_c
        for j ∈ 1 .. N_s
            X[i, j] ← f[i, j]/F[j]
    X
w :=
    f ← f
    for i ∈ 1 .. N_c
        for j ∈ 1 .. N_s
            w[i, j] ← f[i, j]*PM[i]
    w
W :=
    w ← w
    for i ∈ 1 .. N_c
        for j ∈ 1 .. N_s
            W[j] ← sum(w[i, j], i = 1 .. N_c)
    W
%P(β_1, β_2) :=
    w ← w
    W ← W
    for i ∈ 1 .. N_c
        for j ∈ 1 .. N_s
            %P[i, j] ← w[i, j]/W[j]
    %P
f = [
    97.1982, 51.8003, 148.999, 154.6, 70.3002, 77.3002, 1.84288, 68.4573;
    2.8, 0, 2.8, 3.15313e-9, 3.33043e-9, 0, 9.18442e-11, 3.41177e-9;
    0, 5.88378, 5.88378, 3.08288, 3.08288, 0, 0.0808162, 3.00206;
    0, 0, 0, 2.8, 1.4, 0, 0.0367003, 1.3633;
    0.0018, 0, 0.0018, -2.39456e-12, -2.40295e-12, 0, 0, -2.34794e-12;
    0, 0, 0, 0.0009, 0.0009, 0, 2.35931e-5, 0.000876407;
    0, 0, 0, 0, 1.4, 0, 1.33, 0.07
] kmol/hr
## Consistencia balance de masa
W[1] + W[2] - W[6] - W[7] - W[8] = 4.27778e-5 kg/s
