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ORIGIN ≡ 1
Sustancias := ["Na2CO3"; "CO2"; "H2O"; "O2"; "N2"; "NaHCO3"]
PM := [23*2 + 12 + 48; 32 + 12; 18; 32; 28; 23 + 1 + 12 + 48] = [106; 44; 18; 32; 28; 84]
N_c := 6
N_s := 6
i := 1 .. N_c
j := 1 .. N_s
g(x, y) := 10
f := matrix(N_c, N_s, g)
# Datos
## Mezclador
F_1 := 80  # kmol/hr
27/PM[1]/(27/PM[1] + (100 - 27)/PM[3]) = 0.0590953
x[:, 1] := [0.059; 0; 1 - 0.059; 0; 0; 0] = [0.059; 0; 0.941; 0; 0; 0]
f[:, 1] := F_1*x[:, 1]
x[:, 2] := [0; 0.7; 0; 0.3*0.21; 0.3*0.79; 0] = [0; 0.7; 0; 0.063; 0.237; 0]
R_m2.1 := 2.3
## Reactor
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ν := [-1; -1; -1; 0; 0; 2]
ε := [1]
Sustancias = ["Na2CO3"; "CO2"; "H2O"; "O2"; "N2"; "NaHCO3"]
χ_1 := 1
## Filtro
H := 0.15
Retencion := 0.86
## Resolucion
ff := f
Given
## Mezclador
ff[:, 1] + f[:, 2] == f[:, 3]
f[:, 2] == x[:, 2]*sum(f[:, 2])
Sustancias = ["Na2CO3"; "CO2"; "H2O"; "O2"; "N2"; "NaHCO3"]
R_m2.1 == f[2, 3]/f[1, 3]
## Reactor
f[:, 4] == f[:, 3] + ν*ε
χ_1*f[1, 3] == f[1, 3] - f[1, 4]
## Filtro
f[:, 4] == f[:, 5] + f[:, 6]
Sustancias = ["Na2CO3"; "CO2"; "H2O"; "O2"; "N2"; "NaHCO3"]
H == f[3, 6]*PM[3]/(f[6, 6]*PM[6])
Retencion*f[6, 4] == f[6, 6]
f[1, 5]*sum(f[i, 6], i = 1 .. 5) == f[1, 6]*sum(f[i, 5], i = 1 .. 5)
f[2, 5]*sum(f[i, 6], i = 1 .. 5) == f[2, 6]*sum(f[i, 5], i = 1 .. 5)
f[4, 5]*sum(f[i, 6], i = 1 .. 5) == f[4, 6]*sum(f[i, 5], i = 1 .. 5)
f[5, 5]*sum(f[i, 6], i = 1 .. 5) == f[5, 6]*sum(f[i, 5], i = 1 .. 5)
[f; ε] := Find(f, ε)
ε = [4.72]
f = [
    4.72, 0, 4.72, 6.71188e-9, 6.17131e-9, 5.40573e-10;
    0, 10.856, 10.856, 6.136, 5.64181, 0.494191;
    75.28, 0, 75.28, 70.56, 64.8771, 5.68288;
    0, 0.97704, 0.97704, 0.97704, 0.89835, 0.0786905;
    0, 3.67553, 3.67553, 3.67553, 3.37951, 0.296026;
    0, 0, 0, 9.44, 1.3216, 8.1184
]
Sustancias = ["Na2CO3"; "CO2"; "H2O"; "O2"; "N2"; "NaHCO3"]
F :=
    for i ∈ 1 .. N_c
        for j ∈ 1 .. N_s
            F[j] ← sum(f[i, j], i = 1 .. N_c)
    F
w :=
    for i ∈ 1 .. N_c
        for j ∈ 1 .. N_s
            w[i, j] ← f[i, j]*PM[i]
    w
W :=
    for i ∈ 1 .. N_c
        for j ∈ 1 .. N_s
            W[j] ← sum(w[i, j], i = 1 .. N_c)
    W
x :=
    for i ∈ 1 .. N_c
        for j ∈ 1 .. N_s
            x[i, j] ← f[i, j]/F[j]
    x
x = [
    0.059, 0, 0.0494196, 7.39287e-11, 8.10752e-11, 3.68484e-11;
    0, 0.7, 0.113665, 0.0675856, 0.0741189, 0.0336868;
    0.941, 0, 0.788202, 0.77719, 0.852319, 0.387376;
    0, 0.063, 0.0102299, 0.0107617, 0.011802, 0.00536397;
    0, 0.237, 0.0384838, 0.0404845, 0.044398, 0.0201788;
    0, 0, 0, 0.103978, 0.0173624, 0.553394
]
## Consistencia del BM
W[1] + W[2] - W[5] - W[6] = 0
