# Worksheet setting: ORIGIN = 1
## Propiedades termodinámicas
sustancias := ["Dimetileter"; "Metanol"; "Agua"]
T_b := [248.31; 337.85; 373]
PM := [46; 32; 18]
## Datos
N_c := 3
N_s := 9
g(x, y) := 10
i := 1 .. N_c
j := 1 .. N_s
f := matrix(N_c, N_s, g)
f = [
    10, 10, 10, 10, 10, 10, 10, 10, 10;
    10, 10, 10, 10, 10, 10, 10, 10, 10;
    10, 10, 10, 10, 10, 10, 10, 10, 10
]
x[:, 1] := [0; 1; 0]
F_1 := 100
f[:, 1] := F_1*x[:, 1]
## Datos del reactor
ν := [1; -2; 1]
χ_MetOH := 0.935
ε := [10]
## Datos de las torres
LK_T2 := 0.01
HK_T2 := 0.01
LK_T1 := 0.005
HK_T1 := 0.0001
## Datos del splitter
β := 0.25
## Resolución
# Aquellos valores conocidos los nombramos como flujo fijo. Este es el cado de la corriente 1
ff := f
Given
## Mezclador
# Recordar que al finalizar el cálculo cuando escribimos Find en el último equipo tenemos que borrar ff9 y poner f9
ff[:, 1] + f[:, 9] == f[:, 2]
# Debemos especificar Nc + NR ecuaciones
## Reactor
f[:, 3] == f[:, 2] + ν*ε
χ_MetOH == (f[2, 2] - f[2, 3])/f[2, 2]
## Torre 1
sustancias = ["Dimetileter"; "Metanol"; "Agua"]  # LK
f[:, 3] == f[:, 5] + f[:, 4]
HK
# Nuestra corriente de pesados van por F4 y la de los livianos por F5
# En la corriente de los pesados no tenemos mas liviano que el componente clave liviano LK
# En la corriente de los livianos (F5) no tenemos más pesado que el clave pesado HK
# Por bottom tenemos muy poquito de metanol (LK) y nada de dimetileter (cero de lo mas livanos).
# Por top tenemos muy poquito del agua (HK) y nada de los mas pesados (si tuvieramos)
f[1, 4] == 0
f[2, 4] == LK_T1*f[2, 3]
f[3, 5] == HK_T1*f[3, 3]
# Tenemos Nc ecuaciones especificadas
N_c = 3
## Torre 2
LK
sustancias = ["Dimetileter"; "Metanol"; "Agua"]  # HK
f[:, 5] == f[:, 6] + f[:, 7]
f[1, 7] == LK_T2*f[1, 5]
f[2, 6] == HK_T2*f[2, 5]
f[3, 6] == 0
## Splitter
f[:, 7] == f[:, 8] + f[:, 9]
f[:, 8] == β*f[:, 7]
[f(β); ε(β)] := Find(f, ε)  # Luego borramos la ff9 y ponemos f9 ya que ahora la tenemos calculada
f(0.25) = [
    0, 0.371095, 49.4793, 0, 49.4793, 48.9845, 0.494793, 0.123698, 0.371095;
    100, 105.044, 6.82788, 0.0341394, 6.79374, 0.0679374, 6.72581, 1.68145, 5.04435;
    0, 0.00368339, 49.1119, 49.107, 0.00491119, 0, 0.00491119, 0.0012278, 0.00368339
]
## Cuadro para el balance de masa → programación
F(β) :=
    f ← f(β)
    for i ∈ 1 .. N_c
        for j ∈ 1 .. N_s
            F[j] ← sum(f[i, j], i = 1 .. N_c)
    F
F(0.25) = [100; 105.419; 105.419; 49.1411; 56.278; 49.0525; 7.22551; 1.80638; 5.41913]
x(β) :=
    F ← F(β)
    f ← f(β)
    for i ∈ 1 .. N_c
        for j ∈ 1 .. N_s
            x[i, j] ← f[i, j]/F[j]
    x
x(0.25) = [
    0, 0.00352019, 0.469358, 0, 0.879195, 0.998615, 0.0684787, 0.0684787, 0.0684787;
    1, 0.996445, 0.0647689, 0.000694722, 0.120718, 0.001385, 0.930842, 0.930842, 0.930842;
    0, 3.49405e-5, 0.465873, 0.999305, 8.72667e-5, 0, 0.000679702, 0.000679702, 0.000679702
]
w(β) :=
    f ← f(β)
    for i ∈ 1 .. N_c
        for j ∈ 1 .. N_s
            w[i, j] ← PM[i]*f[i, j]
    w
kg/hr
w(0.25) = [
    0, 17.0704, 2276.05, 0, 2276.05, 2253.29, 22.7605, 5.69012, 17.0704;
    3200, 3361.42, 218.492, 1.09246, 217.4, 2.174, 215.226, 53.8064, 161.419;
    0, 0.0663011, 884.015, 883.926, 0.0884015, 0, 0.0884015, 0.0221004, 0.0663011
]
W(β) :=
    w ← w(β)
    for i ∈ 1 .. N_c
        for j ∈ 1 .. N_s
            W[j] ← sum(w[i, j], i = 1 .. N_c)
    W  # Caudal másico total
W(0.25) = [3200; 3378.56; 3378.56; 885.019; 2493.54; 2255.46; 238.075; 59.5187; 178.556]
%P(β) :=
    W ← W(β)
    w ← w(β)
    for i ∈ 1 .. N_c
        for j ∈ 1 .. N_s
            %P[i, j] ← w[i, j]/W[j]
    %P
%P(0.25) = [
    0, 0.00505256, 0.673675, 0, 0.912779, 0.999036, 0.0956023, 0.0956023, 0.0956023;
    1, 0.994928, 0.0646703, 0.00123439, 0.0871853, 0.000963881, 0.904026, 0.904026, 0.904026;
    0, 1.96241e-5, 0.261655, 0.998766, 3.54522e-5, 0, 0.000371318, 0.000371318, 0.000371318
]
## Consistencia del balance de masa global
W(0.25)[1] - W(0.25)[4] - W(0.25)[6] - W(0.25)[8] = 4.83169e-13
β_r := 0, 0.05 .. 1
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# Obtenemos nuestro máximo producto para purgas bajas (mientras más reciclo)
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## Potencial económico
usd := $
Metanol := 10.28*usd/kg
Dimetileter := 10.28*usd/kg
