# Worksheet setting: ORIGIN = 1
# Primero colocamos nuestro origen en 1y planteamos las sustancias, en este caso en volatilidades crecientes (el ejercicio ya nos da el orden), en caso que no sea así, deberiamos buscar su temperatura de ebullición y ordenarlas de forma creciente
sustancias := ["propano"; "propileno"; "benceno"; "cumeno"; "DIPB"]
PM := [44.096; 42.081; 78.114; 120.194; 162.275]
# Cargamos nuestros datos... | filas | columnas
N_c := 5
N_s := 17
g(x, y) := 10
i := 1 .. N_c
j := 1 .. N_s
# Creamos nuestra matriz de flujo molar por componentes, la misma va a estar formada con los valores iniciales definidas en la funcion g(x,y) (1 o 10 para flujos molares bajos de apox 100)
f := matrix(N_c, N_s, g)
# Flujo molar total es la suma de los flujos molares por componente [kmol/hr]
## Datos del enunciado
F_1 := 100
F_2 := 400
# Trabajamos con caudales molares porque estos se conservan
x[:, 1] := [0.1; 0.9; 0; 0; 0]
x[:, 2] := [0; 0; 1; 0; 0]
f[:, 1] := F_1*x[:, 1]
f[:, 2] := F_2*x[:, 2]
f = [
    10, 0, 10, 10, 10, 10, 10, 10, 10, 10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;
    90, 0, 10, 10, 10, 10, 10, 10, 10, 10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;
    0, 400, 10, 10, 10, 10, 10, 10, 10, 10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;
    0, 0, 10, 10, 10, 10, 10, 10, 10, 10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;
    0, 0, 10, 10, 10, 10, 10, 10, 10, 10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]
# Tenemos en cuanta dos matrices de coeficientes, debido a que en el reactor 2 se favorece la reacción inversa
# Debemos especificar tantos parametros del reactor como número de reacciones
# Reactor 1:
# Las columnas de Nu referencian a cada reacción del proceso. En las filas colocamos los coeficientes estequimétricos de cada componente en cada reación, a los reactivos se los pone con signo negativo porque se consumen. Esto hay que verlo como  esté escrita la reacción.
# R1 | R2
ν_1 := [0, 0; -1, 0; -1, 1; 1, -2; 0, 1]
sustancias = ["propano"; "propileno"; "benceno"; "cumeno"; "DIPB"]
# Conversión del propileno (Componente 2) en la reacción 1:
χ_2R1 := 0.9797
# Relación de DIPB-propileno (Componentes 5 y 2) en el reactor 1:
S_52R1 := 0.0903
# Reactor 2:
# La consigna plantea que en el reactor 2, la reacción 2 se da en sentido contrario a como está escrita, cambian los reactivos por producto y viceversa, los signos son los negativos para los que AHORA son reactivos en la columna 2 de este Nu.
# R1  R2
ν_2 := [0, 0; -1, 0; -1, -1; 1, 2; 0, -1]
sustancias = ["propano"; "propileno"; "benceno"; "cumeno"; "DIPB"]
# Conversión del propileno (Componente 2) en la reacción 1:
χ_5R2 := 0.9797
# Proporción DIPB-propileno (Componentes 5 y 2) en el reactor 2:
S_52R2 := 0.0903
# Grado de avance de las reacciones 1 y 2:
# Lo podemos escribir como una matriz de 2x2, 2 reacciones en 2 reactores o como dos vectores columna uno por cada reactor con 2 filas, una por cada reacción.
# Reactor 1 | Reactor 2 | De la matriz, referenciamos sus columnas en los cálculos.
ε := [1, 1; 1, 1]
# Torres de destilación:
# En Torres Flash el flujo de vapor es igual al producto de las volatilidades de esos compuestos y la corrientes de líquidos. No son las de este ejercicio.
# Denotamos el componente más liviano LK y más pesado HK de cada torre:
# "No hay componente más liviano que El componente liviano (LK) en la corriente de pesados y no hay componente más pesado que El componente pesado (HK) en la corriente de livianos"
# Torre 1:
LK_1T1 := 0.0001
HK_2T1 := 0.001
# Torre 2:
LK_3T2 := 0.001
HK_4T2 := 0.001
# Torre 3:
LK_4T3 := 0.001
HK_5T3 := 0.001
# Spliter:
# Coeficientes de purga de cada Splitter:
β_1 := 0.2
β_2 := 0.1
# Resolución:
# Defino las corrientes que ya calculé como flujo fijo (ff) para que MathCad no los tome como valores iniciales del proceso iterativo.
ff := f
# Este es el resultado final, lo ponemos al principio una vez que ya lo tenemos calculado para que MC tome estos valores como iniciales y llegar a un mejor resultado. Es una copia de las celdas de la matriz resultado.
Given
## Mezclador
ff[:, 1] + ff[:, 2] + f[:, 14] == f[:, 3]
## Reactor 1
f[:, 4] == f[:, 3] + ν_1*ε[:, 1]
χ_2R1*f[2, 3] == f[2, 3] - f[2, 4]
S_52R1*f[2, 4] == f[5, 4]
## Torre 1
# La teoría nos decía que en la corriente de pesados no voy a tener un componente más liviano que el clave liviano LK y en la corriente de livianos no voy a tener un componente más pesado que el clave pesado HK.
# Para cada componente clave tenemos un factor de separación, que es un parámetro de equipo que nos indica cuanto separa al componente HK y LK en cada corriente.
# .
# En este caso el LK es el propano y el HK es el propileno
f[3, 5] == 0
f[:, 4] == f[:, 5] + f[:, 6]
f[4, 5] == 0
f[1, 6] == LK_1T1*f[1, 4]
f[2, 5] == HK_2T1*f[2, 4]
f[5, 5] == 0
## Mezclador 2
f[:, 6] + f[:, 12] == f[:, 7]
## Torre 2
f[:, 7] == f[:, 8] + f[:, 9]
f[1, 9] == 0
f[2, 9] == 0
f[3, 9] == LK_3T2*f[3, 7]
f[4, 8] == HK_4T2*f[4, 7]
f[5, 8] == 0
## Torre 3
f[:, 9] == f[:, 10] + f[:, 11]
f[1, 11] == 0
f[2, 11] == 0
f[4, 11] == LK_4T3*f[4, 9]
f[3, 11] == 0
f[5, 10] == HK_5T3*f[5, 9]
## Splitter 1
f[:, 8] == f[:, 14] + f[:, 13]
f[:, 14] == β_1*f[:, 8]
## Splitter 2
f[:, 11] == f[:, 15] + f[:, 16]
f[:, 16] == β_2*f[:, 11]
## Mezclador 3
f[:, 13] + f[:, 15] == f[:, 17]
## Reactor 2
f[:, 12] == f[:, 17] + ν_2*ε[:, 2]
sustancias = ["propano"; "propileno"; "benceno"; "cumeno"; "DIPB"]
χ_5R2*f[5, 17] == f[5, 17] - f[5, 12]
S_52R2*f[2, 12] == f[5, 12]  # Recordamos que la selectividad actua en la corriente de salida
[f(β_1, β_2); ε(β_1, β_2)] := Find(f, ε)
f(0.2, 0.1) = [
    10, 0, 10.001, 10.001, 10, 0.0010001, 0.0050005, 0.0050005, 0, 0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;
    90, 0, 90.3734, 1.83458, 0.00183458, 1.83274, 1.86685, 1.86685, 0, 0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;
    0, 400, 62341.8, 62253.4, 0, 62253.4, 310019, 309709, 310.019, 310.019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;
    0, 0, 0.0180271, 88.2255, 0, 88.2255, 90.1353, 0.0901353, 90.0452, 89.9551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;
    0, 0, 0, 0.165663, 0, 0.165663, 0.168742, 0, 0.168742, 0.000168742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]
ε(0.2, 0.1) = [88.5388, 1.45937; 0.165663, 0.148636]
# Flujos molares totales:
# F (mayúscula o grande) tiene por filas la suma de los flujos molares de cada corriente. Por ejemplo, la columna 1 de F es igual a la sumatoria de las  filas de la columna 1 de f (minúscula o chica).
F(β_1, β_2) :=
    f ← f(β_1, β_2)
    for i ∈ 1 .. N_c
        for j ∈ 1 .. N_s
            F[j] ← sum(f[i, j], i = 1 .. N_c)
    F
# Transponemos la matriz para verla más claramente, no es necesario.
# Fracciones molares por componentes:
# Las corrientes F son iguales a f*x (ambas minúsculas), los flujos por componentes por las fracciones molares, por consiguiente, x es igual a f/F
x(β_1, β_2) :=
    F ← F(β_1, β_2)
    f ← f(β_1, β_2)
    for i ∈ 1 .. N_c
        for j ∈ 1 .. N_s
            x[i, j] ← f[i, j]/F[j]
    x
# Flujo másico por componentes:
# Resulta de pasar la componentes de f (minúscula) a kilogramos.
w(β_1, β_2) :=
    f ← f(β_1, β_2)
    for i ∈ 1 .. N_c
        for j ∈ 1 .. N_s
            w[i, j] ← PM[i]*f[i, j]
    w
# Flujos másicos totales:
# Al igual que con los flujos molares, W (mayúscula) tiene por columnas la sumatoria de las filas de la misma columna de la matriz de flujos por componente.
W(β_1, β_2) :=
    w ← w(β_1, β_2)
    for i ∈ 1 .. N_c
        for j ∈ 1 .. N_s
            W[j] ← sum(w[i, j], i = 1 .. N_c)
    W
transpose(W(0.2, 0.1)) = [4228.25, 31245.6, 4874011, 4874011, 441.037, 4873570, 24227753, 24192686, 35067.1, 35028.9, 38.1782, 19354183, 19354149, 4838537, 34.3604, 3.81782, 19354183]
# Transponemos la matriz para verla más claramente, no es necesario.
# Porcentaje en peso:
# Equivalente a la fracción molar, representa la proporción de cada componente respecto del peso total de la corriente.
%P(β_1, β_2) :=
    W ← W(β_1, β_2)
    w ← w(β_1, β_2)
    for i ∈ 1 .. N_c
        for j ∈ 1 .. N_s
            %P[i, j] ← w[i, j]/W[j]
    %P
# b) Consistencia del balance de masa:
# Se debe verificar que todo lo que ingresa el proceso es igual a todo lo que sale del mismo. Ingresan las corrientes 1 y 2 y salen las corrientes 5, 10 y 16. Planteamos igualado a 0.
W(β_1, β_2)[1] + W(β_1, β_2)[2] - W(β_1, β_2)[5] - W(β_1, β_2)[10] - W(β_1, β_2)[16] = 0.0899811
# c) Gráfica de la fracción molar de Cumeno de la corriente 10 en función de la purga del divisor 2:
β_r := 0, 0.1 .. 1
# Tomamos la corriente 10 como la de producto porque tiene más cumeno que la 16. Se ve en w (minúscula)
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# Grafica de la fracción molar de Cumeno de la corriente 10 en función de la purga del divisor 1:
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# Al incrementar la purga se reduce el flujo de cumeno en la corriente de producto, debido a que se elimina DIPB por la corriente 16. El cual si se recircula ingresa como reactivo al reactor 2
# A medida que incrementamos la purga, enviamos mayor caudal de benceno al reactor Nº1 que favorece la formacion de 1 mol de cumeno.
# Mientras q si la incrementamos, enviamos flujo de benceno al reactor Nº 2 que favorece la formacion de 2 moles de Cumeno.
# Por lo tanto es apropiado tener purgas bajas en ambos Splitter, y de esta manera se favorece la formacion de producto
