ORIGIN ≡ 1
kmol := 1000 mol
N_c := 6
N_s := 16
sustancias := ["nitrogeno"; "etileno"; "acetileno"; "acetaldehido"; "etanol"; "agua"]
PM := [28; 28; 26; 44; 46; 18]*gm/mol
g(x, y) := 10
i := 1 .. N_c
j := 1 .. N_s
f := matrix(N_c, N_s, g)
## Datos
F_1 := 100
x[:, 14] := [0; 0; 0; 0; 0; 1]
x[:, 1] := [0.001; 0.97; 0.029; 0; 0; 0]
f[:, 1] := F_1*x[:, 1]
χC2H4ETILENO := 0.05
χC2H2ACETILENO := 0.50
ν := [0, 0; -1, 0; 0, -1; 0, 1; 1, 0; -1, -1]
Sustancias := ["N2"; "C2H4"; "C2H2"; "CH3CHO"; "C2H5OH"; "H2O"]
ε := [10; 10]
HK := 0.01
LK := 0.01
β_1 := 0.2
β_2 := 0.2
ff := f
## Resolución
Given
## M1
Rm := 0.6
ff[:, 1] + f[:, 14] + f[:, 7] + f[:, 16] == f[:, 2]
x[:, 14]*sum(f[:, 14]) == f[:, 14]
f[2, 2]*Rm == f[6, 2]
## R1
f[:, 3] == f[:, 2] + ν*ε
χC2H4ETILENO*f[2, 2] == f[2, 2] - f[2, 3]
sustancias = ["nitrogeno"; "etileno"; "acetileno"; "acetaldehido"; "etanol"; "agua"]
χC2H2ACETILENO*f[3, 2] == f[3, 2] - f[3, 3]
## T1
f[:, 3] == f[:, 4] + f[:, 5]
LK
f[3, 4] == LK*f[3, 3]
sustancias = ["nitrogeno"; "etileno"; "acetileno"; "acetaldehido"; "etanol"; "agua"]  # HK
f[4, 5] == HK*f[4, 3]
f[1, 4] == 0
f[5, 5] == 0
f[2, 4] == 0
f[6, 5] == 0
## T2
f[:, 4] == f[:, 8] + f[:, 9]
sustancias = ["nitrogeno"; "etileno"; "acetileno"; "acetaldehido"; "etanol"; "agua"]
LK
HK
f[5, 8] == LK*f[5, 4]
f[1, 8] == 0
f[2, 8] == 0
f[6, 9] == HK*f[6, 4]
f[3, 8] == 0
f[4, 8] == 0
## T3
f[:, 9] == f[:, 10] + f[:, 11]
sustancias = ["nitrogeno"; "etileno"; "acetileno"; "acetaldehido"; "etanol"; "agua"]  # LK
HK
f[4, 10] == LK*f[4, 9]
f[1, 10] == 0
f[2, 10] == 0
f[5, 11] == HK*f[5, 9]
f[3, 10] == 0
f[6, 11] == 0
## T4
f[:, 10] == f[:, 12] + f[:, 13]
sustancias = ["nitrogeno"; "etileno"; "acetileno"; "acetaldehido"; "etanol"; "agua"]
LK
HK
f[5, 12] == LK*f[5, 10]
f[1, 12] == 0
f[2, 12] == 0
f[6, 13] == HK*f[6, 10]
f[3, 12] == 0
f[4, 12] == 0
## S1
## S2
f[:, 5] == f[:, 6] + f[:, 7]
f[:, 8] == f[:, 15] + f[:, 16]
f[:, 6] == β_1*f[:, 5]
f[:, 15] == f[:, 8]*β_2
[f(β_1, β_2); ε(β_1, β_2)] := Find(f, ε)
f(0.2, 0.2) = [
    0.1, 0.5, 0.5, 0, 0.5, 0.1, 0.4, 0, 0, 0, 0, 0, 0, 0, 0, 0;
    97, 404.167, 383.958, 0, 383.958, 76.7917, 307.167, 0, 0, 0, 0, 0, 0, 0, 0, 0;
    2.9, 4.80132, 2.40066, 0.0240066, 2.37666, 0.475331, 1.90132, 0, 0.0240066, 0, 0.0240066, 0, 0, 0, 0, 0;
    0, 0.0193602, 2.42002, 2.39582, 0.0242002, 0.00484004, 0.0193602, 0, 2.39582, 0.0239582, 2.37186, 0, 0.0239582, 0, 0, 0;
    0, 0.16297, 20.3713, 20.3713, 0, 0, 0, 0.203713, 20.1676, 19.9659, 0.201676, 0.199659, 19.7663, 0, 0.0407426, 0.16297;
    0, 242.5, 219.891, 219.891, 0, 0, 0, 217.692, 2.19891, 2.19891, 0, 2.17692, 0.0219891, 68.3463, 43.5384, 174.154
]
f(β_1, β_2) :=
    f ← f(β_1, β_2)
    f*mol/hr
F(β_1, β_2) :=
    f ← f(β_1, β_2)
    for i ∈ 1 .. N_c
        for j ∈ 1 .. N_s
            F[j] ← sum(f[i, j], i = 1 .. N_c)
    F
X(β_1, β_2) :=
    f ← f(β_1, β_2)
    F ← F(β_1, β_2)
    for i ∈ 1 .. N_c
        for j ∈ 1 .. N_s
            X[i, j] ← f[i, j]/F[j]
    X
w(β_1, β_2) :=
    f ← f(β_1, β_2)
    for i ∈ 1 .. N_c
        for j ∈ 1 .. N_s
            w[i, j] ← f[i, j]*PM[i]
    w
W(β_1, β_2) :=
    w ← w(β_1, β_2)
    for i ∈ 1 .. N_c
        for j ∈ 1 .. N_s
            W[j] ← sum(w[i, j], i = 1 .. N_c)
    W
%P(β_1, β_2) :=
    w ← w(β_1, β_2)
    W ← W(β_1, β_2)
    for i ∈ 1 .. N_c
        for j ∈ 1 .. N_s
            %P[i, j] ← w[i, j]/W[j]
    %P
# BM GLOBAL
W(0.1, 0.3)[1] + W(0.1, 0.3)[14] - W(0.1, 0.3)[6] - W(0.1, 0.3)[15] - W(0.1, 0.3)[11] - W(0.1, 0.3)[13] - W(0.1, 0.3)[12] = -1.86347e-19 kg/s
βr := 0, 0.1 .. 1
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usd := $
δ_etanol := 789*kg/m^3
precio_etanol := 9.3*usd/gal
ω_etanol := w(0.1, 0.3)[5, 13] = 1.50345 kg/hr
QV_etanol := ω_etanol/δ_etanol = 0.00190551 m^3/hr
Ganancias := precio_etanol*QV_etanol = 4.68145 usd/hr
precio_etileno := 0.46*usd/lb
ω_etileno := w(0.1, 0.3)[2, 1] = 2.716 kg/hr
Gasto_etileno := precio_etileno*ω_etileno = 2.75437 usd/hr
precio_agua := 0.067*usd/(1000 kg)
ω_agua := w(0.1, 0.3)[6, 14] = 2.66787 kg/hr
Gasto_agua := precio_agua*ω_agua = 0.000178748 usd/hr
# Efluentes peligrosos | Efluentes no peligrosos
precio_ENP := 36*usd/ton
precio_EP := 200*usd/ton
ω_EP := W(0.1, 03)[6] + W(0.1, 03)[15] + W(0.1, 03)[11] + W(0.1, 03)[12] = 21.5734 kg/hr
Gasto_EP := ω_EP*precio_EP = 4.75613 usd/hr
BE := Ganancias - Gasto_agua - Gasto_etileno - Gasto_EP
BE = -2.82922 usd/hr
k1 := [4.3247; 3.4974]
k2 := [-0.3030; 0.4485]
k3 := [0.1634; 0.1074]
Reactor(β_1, β_2) := 10^(k1[1] + k2[1]*log(F(β_1, β_2)[2]/(mol/hr)) + k3[1]*log(F(β_1, β_2)[2]/(mol/hr))^2)
Torre1(β1, β2) := 10^(k1[2] + k2[2]*log(F(β1, β2)[3]/(mol/hr)) + k3[2]*log(F(β1, β2)[3]/(mol/hr))^2)
Torre2(β1, β2) := 10^(k1[2] + k2[2]*log(F(β1, β2)[4]/(mol/hr)) + k3[2]*log(F(β1, β2)[4]/(mol/hr))^2)
Torre3(β1, β2) := 10^(k1[2] + k2[2]*log(F(β1, β2)[9]/(mol/hr)) + k3[2]*log(F(β1, β2)[9]/(mol/hr))^2)
Torre4(β1, β2) := 10^(k1[2] + k2[2]*log(F(β1, β2)[10]/(mol/hr)) + k3[2]*log(F(β1, β2)[10]/(mol/hr))^2)
CE(β1, β2) := Torre2(β1, β2) + Torre3(β1, β2) + Reactor(β1, β2) + Torre1(β1, β2) + Torre4(β1, β2)
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