sustancias := [""; ""; ""; ""; ""]
PM := [□; □; □; □; □]
# Cargamos nuestros datos... | filas | columnas
N_c := □
N_s := □
g(x, y) := 10
i := 1 .. N_c
j := 1 .. N_s
f := matrix(N_c, N_s, g)
## Datos del enunciado
F_1 := □
F_2 := □
x[:, 1] := [□; □; □; □; □]
x[:, 2] := [□; □; □; □; □]
f[:, 1] := F_1*x[:, 1]
f[:, 2] := F_2*x[:, 2]
# https://ecstatic-torvalds-f9023a.netlify.app/
f(β_1, β_2) :=
    f ← f(β_1, β_2)
    f*mol/hr
F(β_1, β_2) :=
    f ← f(β_1, β_2)
    for i ∈ 1 .. N_c
        for j ∈ 1 .. N_s
            F[j] ← sum(f[i, j], i = 1 .. N_c)
    F
X(β_1, β_2) :=
    f ← f(β_1, β_2)
    F ← F(β_1, β_2)
    for i ∈ 1 .. N_c
        for j ∈ 1 .. N_s
            X[i, j] ← f[i, j]/F[j]
    X
w(β_1, β_2) :=
    f ← f(β_1, β_2)
    for i ∈ 1 .. N_c
        for j ∈ 1 .. N_s
            w[i, j] ← f[i, j]*PM[i]
    w
W(β_1, β_2) :=
    w ← w(β_1, β_2)
    for i ∈ 1 .. N_c
        for j ∈ 1 .. N_s
            W[j] ← sum(w[i, j], i = 1 .. N_c)
    W
%P(β_1, β_2) :=
    w ← w(β_1, β_2)
    W ← W(β_1, β_2)
    for i ∈ 1 .. N_c
        for j ∈ 1 .. N_s
            %P[i, j] ← w[i, j]/W[j]
    %P
